<?xml version="1.0" encoding="UTF-8"?>
<neuroml xmlns="http://www.neuroml.org/schema/neuroml2" xmlns:xsi="http://www.w3.org/2001/XMLSchema-instance" xsi:schemaLocation="http://www.neuroml.org/schema/neuroml2  https://raw.githubusercontent.com/NeuroML/NeuroML2/development/Schemas/NeuroML2/NeuroML_v2beta5.xsd" id="network_GranCellLayer">

    <notes>

Network structure (NeuroML 2beta5) for project: GranCellLayer saved with neuroConstruct v1.7.1 on: 17:23:37, 23-Jun-20

Cell Group: GoC_3D contains 32 cells
Cell Group: MF_3D contains 96 cells
Cell Group: GrC_3D contains 600 cells

Network connection: NetConnMFGrC contains 2511 individual synaptic connections
Network connection: NetConnGoCGrC contains 600 individual synaptic connections
Network connection: NetConnGrCGoC contains 2400 individual synaptic connections

    </notes>

    <include href="AMPA_GranGol.synapse.nml"/>
    <include href="GABAA.synapse.nml"/>
    <include href="Golgi_98_3D.cell.nml"/>
    <include href="Golgi_CaHVA_CML.channel.nml"/>
    <include href="Golgi_CaPool_CML.nml"/>
    <include href="Golgi_H_CML.channel.nml"/>
    <include href="Golgi_KA_CML.channel.nml"/>
    <include href="Golgi_KCa_CML.channel.nml"/>
    <include href="Golgi_KDr_CML.channel.nml"/>
    <include href="Golgi_NaF_CML.channel.nml"/>
    <include href="GolgiPassiveCond.channel.nml"/>
    <include href="Gran_CaHVA_98.channel.nml"/>
    <include href="Gran_CaPool_98.nml"/>
    <include href="Gran_H_98.channel.nml"/>
    <include href="Gran_KA_98.channel.nml"/>
    <include href="Gran_KCa_98.channel.nml"/>
    <include href="Gran_KDr_98.channel.nml"/>
    <include href="Gran_NaF_98.channel.nml"/>
    <include href="GranPassiveCond.channel.nml"/>
    <include href="Granule_98_3D_.cell.nml"/>
    <include href="MF_AMPA.synapse.nml"/>
    <include href="MFFastLeakCond.channel.nml"/>
    <include href="MFSpikeSyn.synapse.nml"/>
    <include href="MossyFiber.cell.nml"/>
    <include href="NMDA.synapse.nml"/>
    <poissonFiringSynapse id="Input_4" averageRate="50.0 per_s" synapse="MFSpikeSyn" spikeTarget="./MFSpikeSyn"/>

    <network id="network_GranCellLayer" type="networkWithTemperature" temperature="32.0 degC">

        <population id="GoC_3D" component="Golgi_98_3D" type="populationList" size="32">
            <instance id="0">
                <location x="-110.397644" y="23.920101" z="-385.24292"/>
            </instance>
            <instance id="1">
                <location x="123.79611" y="19.671207" z="411.727"/>
            </instance>
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        </population>

        <population id="MF_3D" component="MossyFiber" type="populationList" size="96">
            <instance id="0">
                <location x="69.193634" y="23.687023" z="-361.8977"/>
            </instance>
            <instance id="1">
                <location x="52.55844" y="21.580141" z="62.883057"/>
            </instance>
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        </population>

        <population id="GrC_3D" component="Granule_98_3D_" type="populationList" size="600">
            <instance id="0">
                <location x="228.1896" y="23.721388" z="257.40033"/>
            </instance>
            <instance id="1">
                <location x="105.81888" y="15.927601" z="-159.79242"/>
            </instance>
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        </population>

        <projection synapse="MF_AMPA" id="NetConnMFGrC__MF_AMPA" presynapticPopulation="MF_3D" postsynapticPopulation="GrC_3D">
            <connectionWD id="0" preCellId="../MF_3D/50/MossyFiber" postCellId="../GrC_3D/0/Granule_98_3D_" preSegmentId="0" preFractionAlong="0.0" postSegmentId="0" postFractionAlong="0.5" delay="0.0 s" weight="6.3301888"/>
            <connectionWD id="1" preCellId="../MF_3D/4/MossyFiber" postCellId="../GrC_3D/0/Granule_98_3D_" preSegmentId="0" preFractionAlong="0.0" postSegmentId="0" postFractionAlong="0.5" delay="0.0 s" weight="5.564011"/>
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        </projection>

        <projection synapse="NMDA" id="NetConnMFGrC__NMDA" presynapticPopulation="MF_3D" postsynapticPopulation="GrC_3D">
            <connectionWD id="0" preCellId="../MF_3D/50/MossyFiber" postCellId="../GrC_3D/0/Granule_98_3D_" preSegmentId="0" preFractionAlong="0.0" postSegmentId="0" postFractionAlong="0.5" delay="0.0 s" weight="3.644176"/>
            <connectionWD id="1" preCellId="../MF_3D/4/MossyFiber" postCellId="../GrC_3D/0/Granule_98_3D_" preSegmentId="0" preFractionAlong="0.0" postSegmentId="0" postFractionAlong="0.5" delay="0.0 s" weight="3.955898"/>
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        </projection>

        <projection synapse="GABAA" id="NetConnGoCGrC" presynapticPopulation="GoC_3D" postsynapticPopulation="GrC_3D">
            <connectionWD id="0" preCellId="../GoC_3D/22/Golgi_98_3D" postCellId="../GrC_3D/0/Granule_98_3D_" preSegmentId="0" preFractionAlong="0.5" postSegmentId="0" postFractionAlong="0.5" delay="0.0 s" weight="51.233772"/>
            <connectionWD id="1" preCellId="../GoC_3D/18/Golgi_98_3D" postCellId="../GrC_3D/1/Granule_98_3D_" preSegmentId="0" preFractionAlong="0.5" postSegmentId="0" postFractionAlong="0.5" delay="0.0 s" weight="39.791122"/>
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        </projection>

        <projection synapse="AMPA_GranGol" id="NetConnGrCGoC" presynapticPopulation="GrC_3D" postsynapticPopulation="GoC_3D">
            <connectionWD id="0" preCellId="../GrC_3D/0/Granule_98_3D_" postCellId="../GoC_3D/8/Golgi_98_3D" preSegmentId="100115" preFractionAlong="0.7835217" postSegmentId="3" postFractionAlong="0.78202" delay="0.0 s" weight="0.5139887"/>
            <connectionWD id="1" preCellId="../GrC_3D/0/Granule_98_3D_" postCellId="../GoC_3D/14/Golgi_98_3D" preSegmentId="100111" preFractionAlong="0.1683168" postSegmentId="3" postFractionAlong="0.75329906" delay="0.0 s" weight="0.6863774"/>
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        </projection>

        <inputList id="Input_4" component="Input_4" population="MF_3D">
            <input id="0" target="../MF_3D/0/MossyFiber" destination="synapses"/>
            <input id="1" target="../MF_3D/1/MossyFiber" destination="synapses"/>
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        </inputList>

    </network>

</neuroml>
