<Lems xmlns="http://www.neuroml.org/lems/0.7.2" xmlns:xsi="http://www.w3.org/2001/XMLSchema-instance" xsi:schemaLocation="http://www.neuroml.org/lems/0.7.2  https://raw.githubusercontent.com/LEMS/LEMS/development/Schemas/LEMS/LEMS_v0.7.2.xsd">

    <Target component="sim1" reportFile="simulator.props" timesFile="time.dat"/>

        <!--Include standard NeuroML 2 ComponentType definitions-->

    <Include file="Cells.xml"/>
    <Include file="Networks.xml"/>
    <Include file="Simulation.xml"/>

        <!--Include the generated NeuroML 2 files-->

        <!--   Channel/synapse files-->
    <Include file="AMPA_GranGol.synapse.nml"/>
    <Include file="GABAA.synapse.nml"/>
    <Include file="Golgi_CaHVA_CML.channel.nml"/>
    <Include file="Golgi_CaPool_CML.nml"/>
    <Include file="Golgi_H_CML.channel.nml"/>
    <Include file="Golgi_KA_CML.channel.nml"/>
    <Include file="Golgi_KCa_CML.channel.nml"/>
    <Include file="Golgi_KDr_CML.channel.nml"/>
    <Include file="Golgi_NaF_CML.channel.nml"/>
    <Include file="GolgiPassiveCond.channel.nml"/>
    <Include file="Gran_CaHVA_98.channel.nml"/>
    <Include file="Gran_CaPool_98.nml"/>
    <Include file="Gran_H_98.channel.nml"/>
    <Include file="Gran_KA_98.channel.nml"/>
    <Include file="Gran_KCa_98.channel.nml"/>
    <Include file="Gran_KDr_98.channel.nml"/>
    <Include file="Gran_NaF_98.channel.nml"/>
    <Include file="GranPassiveCond.channel.nml"/>
    <Include file="MF_AMPA.synapse.nml"/>
    <Include file="MFFastLeakCond.channel.nml"/>
    <Include file="MFSpikeSyn.synapse.nml"/>
    <Include file="NMDA.synapse.nml"/>
        <!--   Cell files-->
    <Include file="Golgi_98_3D.cell.nml"/>
    <Include file="Granule_98_3D_.cell.nml"/>
    <Include file="MossyFiber.cell.nml"/>
        <!--   Network file-->
    <Include file="GranCellLayer.net.nml"/>

        <!--Note: this could be: Simulation id="sim1" ... , but Component type="Simulation" ...
        is used to allow validation of this file according to the LEMS schema specified above...-->
    <Component type="Simulation" id="sim1" length="1000.0ms" step="0.025ms" target="network_GranCellLayer">

        <OutputFile id="GoC_3D_v_0_0_OF" fileName="GoC_3D_0.0.dat">
            <OutputColumn id="v" quantity="GoC_3D/0/Golgi_98_3D/0/v"/>
        </OutputFile>

        <OutputFile id="GoC_3D_v_1_0_OF" fileName="GoC_3D_1.0.dat">
            <OutputColumn id="v" quantity="GoC_3D/1/Golgi_98_3D/0/v"/>
        </OutputFile>
    <!--
        <OutputFile id="GoC_3D_v_2_0_OF" fileName="GoC_3D_2.0.dat">
            <OutputColumn id="v" quantity="GoC_3D/2/Golgi_98_3D/0/v"/>
        </OutputFile>

        <OutputFile id="GoC_3D_v_3_0_OF" fileName="GoC_3D_3.0.dat">
            <OutputColumn id="v" quantity="GoC_3D/3/Golgi_98_3D/0/v"/>
        </OutputFile>

        <OutputFile id="GoC_3D_v_4_0_OF" fileName="GoC_3D_4.0.dat">
            <OutputColumn id="v" quantity="GoC_3D/4/Golgi_98_3D/0/v"/>
        </OutputFile>

        <OutputFile id="GoC_3D_v_5_0_OF" fileName="GoC_3D_5.0.dat">
            <OutputColumn id="v" quantity="GoC_3D/5/Golgi_98_3D/0/v"/>
        </OutputFile>

        <OutputFile id="GoC_3D_v_6_0_OF" fileName="GoC_3D_6.0.dat">
            <OutputColumn id="v" quantity="GoC_3D/6/Golgi_98_3D/0/v"/>
        </OutputFile>

        <OutputFile id="GoC_3D_v_7_0_OF" fileName="GoC_3D_7.0.dat">
            <OutputColumn id="v" quantity="GoC_3D/7/Golgi_98_3D/0/v"/>
        </OutputFile>

        <OutputFile id="GoC_3D_v_8_0_OF" fileName="GoC_3D_8.0.dat">
            <OutputColumn id="v" quantity="GoC_3D/8/Golgi_98_3D/0/v"/>
        </OutputFile>

        <OutputFile id="GoC_3D_v_9_0_OF" fileName="GoC_3D_9.0.dat">
            <OutputColumn id="v" quantity="GoC_3D/9/Golgi_98_3D/0/v"/>
        </OutputFile>

        <OutputFile id="GoC_3D_v_10_0_OF" fileName="GoC_3D_10.0.dat">
            <OutputColumn id="v" quantity="GoC_3D/10/Golgi_98_3D/0/v"/>
        </OutputFile>

        <OutputFile id="GoC_3D_v_11_0_OF" fileName="GoC_3D_11.0.dat">
            <OutputColumn id="v" quantity="GoC_3D/11/Golgi_98_3D/0/v"/>
        </OutputFile>

        <OutputFile id="GoC_3D_v_12_0_OF" fileName="GoC_3D_12.0.dat">
            <OutputColumn id="v" quantity="GoC_3D/12/Golgi_98_3D/0/v"/>
        </OutputFile>

        <OutputFile id="GoC_3D_v_13_0_OF" fileName="GoC_3D_13.0.dat">
            <OutputColumn id="v" quantity="GoC_3D/13/Golgi_98_3D/0/v"/>
        </OutputFile>

        <OutputFile id="GoC_3D_v_14_0_OF" fileName="GoC_3D_14.0.dat">
            <OutputColumn id="v" quantity="GoC_3D/14/Golgi_98_3D/0/v"/>
        </OutputFile>

        <OutputFile id="GoC_3D_v_15_0_OF" fileName="GoC_3D_15.0.dat">
            <OutputColumn id="v" quantity="GoC_3D/15/Golgi_98_3D/0/v"/>
        </OutputFile>

        <OutputFile id="GoC_3D_v_16_0_OF" fileName="GoC_3D_16.0.dat">
            <OutputColumn id="v" quantity="GoC_3D/16/Golgi_98_3D/0/v"/>
        </OutputFile>

        <OutputFile id="GoC_3D_v_17_0_OF" fileName="GoC_3D_17.0.dat">
            <OutputColumn id="v" quantity="GoC_3D/17/Golgi_98_3D/0/v"/>
        </OutputFile>

        <OutputFile id="GoC_3D_v_18_0_OF" fileName="GoC_3D_18.0.dat">
            <OutputColumn id="v" quantity="GoC_3D/18/Golgi_98_3D/0/v"/>
        </OutputFile>

        <OutputFile id="GoC_3D_v_19_0_OF" fileName="GoC_3D_19.0.dat">
            <OutputColumn id="v" quantity="GoC_3D/19/Golgi_98_3D/0/v"/>
        </OutputFile>

        <OutputFile id="GoC_3D_v_20_0_OF" fileName="GoC_3D_20.0.dat">
            <OutputColumn id="v" quantity="GoC_3D/20/Golgi_98_3D/0/v"/>
        </OutputFile>

        <OutputFile id="GoC_3D_v_21_0_OF" fileName="GoC_3D_21.0.dat">
            <OutputColumn id="v" quantity="GoC_3D/21/Golgi_98_3D/0/v"/>
        </OutputFile>

        <OutputFile id="GoC_3D_v_22_0_OF" fileName="GoC_3D_22.0.dat">
            <OutputColumn id="v" quantity="GoC_3D/22/Golgi_98_3D/0/v"/>
        </OutputFile>

        <OutputFile id="GoC_3D_v_23_0_OF" fileName="GoC_3D_23.0.dat">
            <OutputColumn id="v" quantity="GoC_3D/23/Golgi_98_3D/0/v"/>
        </OutputFile>

        <OutputFile id="GoC_3D_v_24_0_OF" fileName="GoC_3D_24.0.dat">
            <OutputColumn id="v" quantity="GoC_3D/24/Golgi_98_3D/0/v"/>
        </OutputFile>

        <OutputFile id="GoC_3D_v_25_0_OF" fileName="GoC_3D_25.0.dat">
            <OutputColumn id="v" quantity="GoC_3D/25/Golgi_98_3D/0/v"/>
        </OutputFile>

        <OutputFile id="GoC_3D_v_26_0_OF" fileName="GoC_3D_26.0.dat">
            <OutputColumn id="v" quantity="GoC_3D/26/Golgi_98_3D/0/v"/>
        </OutputFile>

        <OutputFile id="GoC_3D_v_27_0_OF" fileName="GoC_3D_27.0.dat">
            <OutputColumn id="v" quantity="GoC_3D/27/Golgi_98_3D/0/v"/>
        </OutputFile>

        <OutputFile id="GoC_3D_v_28_0_OF" fileName="GoC_3D_28.0.dat">
            <OutputColumn id="v" quantity="GoC_3D/28/Golgi_98_3D/0/v"/>
        </OutputFile>

        <OutputFile id="GoC_3D_v_29_0_OF" fileName="GoC_3D_29.0.dat">
            <OutputColumn id="v" quantity="GoC_3D/29/Golgi_98_3D/0/v"/>
        </OutputFile>

        <OutputFile id="GoC_3D_v_30_0_OF" fileName="GoC_3D_30.0.dat">
            <OutputColumn id="v" quantity="GoC_3D/30/Golgi_98_3D/0/v"/>
        </OutputFile>

        <OutputFile id="GoC_3D_v_31_0_OF" fileName="GoC_3D_31.0.dat">
            <OutputColumn id="v" quantity="GoC_3D/31/Golgi_98_3D/0/v"/>
        </OutputFile>

        <OutputFile id="GrC_3D_v_0_0_OF" fileName="GrC_3D_0.0.SPIKE_min20.dat">
            <OutputColumn id="v" quantity="GrC_3D/0/Granule_98_3D_/0/v"/>
        </OutputFile>

        <OutputFile id="GrC_3D_v_1_0_OF" fileName="GrC_3D_1.0.SPIKE_min20.dat">
            <OutputColumn id="v" quantity="GrC_3D/1/Granule_98_3D_/0/v"/>
        </OutputFile>

        <OutputFile id="GrC_3D_v_2_0_OF" fileName="GrC_3D_2.0.SPIKE_min20.dat">
            <OutputColumn id="v" quantity="GrC_3D/2/Granule_98_3D_/0/v"/>
        </OutputFile>

        <OutputFile id="GrC_3D_v_3_0_OF" fileName="GrC_3D_3.0.SPIKE_min20.dat">
            <OutputColumn id="v" quantity="GrC_3D/3/Granule_98_3D_/0/v"/>
        </OutputFile>

        <OutputFile id="GrC_3D_v_4_0_OF" fileName="GrC_3D_4.0.SPIKE_min20.dat">
            <OutputColumn id="v" quantity="GrC_3D/4/Granule_98_3D_/0/v"/>
        </OutputFile>

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        -->
    </Component>

</Lems>
