<Lems>

    <!--

        This LEMS file has been automatically generated using PyNeuroML v0.5.3 (libNeuroML v0.2.51)

     -->

    <!-- Specify which component to run -->
    <Target component="Sim_M1_p_1percent"/>

    <!-- Include core NeuroML2 ComponentType definitions -->
    <Include file="Cells.xml"/>
    <Include file="Networks.xml"/>
    <Include file="Simulation.xml"/>

    <Include file="M1_p_1percent.net.nml"/>

    <Simulation id="Sim_M1_p_1percent" length="1000.0ms" step="0.05ms" target="M1_p_1percent" seed="12345">  <!-- Note seed: ensures same random numbers used every run -->

        <OutputFile id="Volts_file__IT_L23" fileName="Sim_M1_p_1percent.IT_L23.v.dat">
            <OutputColumn id="v_IT_L23_0_CELL_IT_v" quantity="IT_L23/0/CELL_IT/v"/>
            <OutputColumn id="v_IT_L23_1_CELL_IT_v" quantity="IT_L23/1/CELL_IT/v"/>
            <OutputColumn id="v_IT_L23_2_CELL_IT_v" quantity="IT_L23/2/CELL_IT/v"/>
            <OutputColumn id="v_IT_L23_3_CELL_IT_v" quantity="IT_L23/3/CELL_IT/v"/>
            <OutputColumn id="v_IT_L23_4_CELL_IT_v" quantity="IT_L23/4/CELL_IT/v"/>
            <OutputColumn id="v_IT_L23_5_CELL_IT_v" quantity="IT_L23/5/CELL_IT/v"/>
            <OutputColumn id="v_IT_L23_6_CELL_IT_v" quantity="IT_L23/6/CELL_IT/v"/>
            <OutputColumn id="v_IT_L23_7_CELL_IT_v" quantity="IT_L23/7/CELL_IT/v"/>
            <OutputColumn id="v_IT_L23_8_CELL_IT_v" quantity="IT_L23/8/CELL_IT/v"/>
            <OutputColumn id="v_IT_L23_9_CELL_IT_v" quantity="IT_L23/9/CELL_IT/v"/>
            <OutputColumn id="v_IT_L23_10_CELL_IT_v" quantity="IT_L23/10/CELL_IT/v"/>
            <OutputColumn id="v_IT_L23_11_CELL_IT_v" quantity="IT_L23/11/CELL_IT/v"/>
            <OutputColumn id="v_IT_L23_12_CELL_IT_v" quantity="IT_L23/12/CELL_IT/v"/>
            <OutputColumn id="v_IT_L23_13_CELL_IT_v" quantity="IT_L23/13/CELL_IT/v"/>
            <OutputColumn id="v_IT_L23_14_CELL_IT_v" quantity="IT_L23/14/CELL_IT/v"/>
            <OutputColumn id="v_IT_L23_15_CELL_IT_v" quantity="IT_L23/15/CELL_IT/v"/>
            <OutputColumn id="v_IT_L23_16_CELL_IT_v" quantity="IT_L23/16/CELL_IT/v"/>
            <OutputColumn id="v_IT_L23_17_CELL_IT_v" quantity="IT_L23/17/CELL_IT/v"/>
        </OutputFile>

        <OutputFile id="Volts_file__IT_L4" fileName="Sim_M1_p_1percent.IT_L4.v.dat">
            <OutputColumn id="v_IT_L4_0_CELL_IT_v" quantity="IT_L4/0/CELL_IT/v"/>
            <OutputColumn id="v_IT_L4_1_CELL_IT_v" quantity="IT_L4/1/CELL_IT/v"/>
            <OutputColumn id="v_IT_L4_2_CELL_IT_v" quantity="IT_L4/2/CELL_IT/v"/>
            <OutputColumn id="v_IT_L4_3_CELL_IT_v" quantity="IT_L4/3/CELL_IT/v"/>
            <OutputColumn id="v_IT_L4_4_CELL_IT_v" quantity="IT_L4/4/CELL_IT/v"/>
            <OutputColumn id="v_IT_L4_5_CELL_IT_v" quantity="IT_L4/5/CELL_IT/v"/>
            <OutputColumn id="v_IT_L4_6_CELL_IT_v" quantity="IT_L4/6/CELL_IT/v"/>
            <OutputColumn id="v_IT_L4_7_CELL_IT_v" quantity="IT_L4/7/CELL_IT/v"/>
            <OutputColumn id="v_IT_L4_8_CELL_IT_v" quantity="IT_L4/8/CELL_IT/v"/>
        </OutputFile>

        <OutputFile id="Volts_file__IT_L5A" fileName="Sim_M1_p_1percent.IT_L5A.v.dat">
            <OutputColumn id="v_IT_L5A_0_CELL_IT_v" quantity="IT_L5A/0/CELL_IT/v"/>
            <OutputColumn id="v_IT_L5A_1_CELL_IT_v" quantity="IT_L5A/1/CELL_IT/v"/>
            <OutputColumn id="v_IT_L5A_2_CELL_IT_v" quantity="IT_L5A/2/CELL_IT/v"/>
            <OutputColumn id="v_IT_L5A_3_CELL_IT_v" quantity="IT_L5A/3/CELL_IT/v"/>
            <OutputColumn id="v_IT_L5A_4_CELL_IT_v" quantity="IT_L5A/4/CELL_IT/v"/>
            <OutputColumn id="v_IT_L5A_5_CELL_IT_v" quantity="IT_L5A/5/CELL_IT/v"/>
            <OutputColumn id="v_IT_L5A_6_CELL_IT_v" quantity="IT_L5A/6/CELL_IT/v"/>
            <OutputColumn id="v_IT_L5A_7_CELL_IT_v" quantity="IT_L5A/7/CELL_IT/v"/>
            <OutputColumn id="v_IT_L5A_8_CELL_IT_v" quantity="IT_L5A/8/CELL_IT/v"/>
            <OutputColumn id="v_IT_L5A_9_CELL_IT_v" quantity="IT_L5A/9/CELL_IT/v"/>
        </OutputFile>

        <OutputFile id="Volts_file__IT_L5B" fileName="Sim_M1_p_1percent.IT_L5B.v.dat">
            <OutputColumn id="v_IT_L5B_0_CELL_IT_v" quantity="IT_L5B/0/CELL_IT/v"/>
            <OutputColumn id="v_IT_L5B_1_CELL_IT_v" quantity="IT_L5B/1/CELL_IT/v"/>
            <OutputColumn id="v_IT_L5B_2_CELL_IT_v" quantity="IT_L5B/2/CELL_IT/v"/>
            <OutputColumn id="v_IT_L5B_3_CELL_IT_v" quantity="IT_L5B/3/CELL_IT/v"/>
            <OutputColumn id="v_IT_L5B_4_CELL_IT_v" quantity="IT_L5B/4/CELL_IT/v"/>
            <OutputColumn id="v_IT_L5B_5_CELL_IT_v" quantity="IT_L5B/5/CELL_IT/v"/>
            <OutputColumn id="v_IT_L5B_6_CELL_IT_v" quantity="IT_L5B/6/CELL_IT/v"/>
            <OutputColumn id="v_IT_L5B_7_CELL_IT_v" quantity="IT_L5B/7/CELL_IT/v"/>
            <OutputColumn id="v_IT_L5B_8_CELL_IT_v" quantity="IT_L5B/8/CELL_IT/v"/>
            <OutputColumn id="v_IT_L5B_9_CELL_IT_v" quantity="IT_L5B/9/CELL_IT/v"/>
            <OutputColumn id="v_IT_L5B_10_CELL_IT_v" quantity="IT_L5B/10/CELL_IT/v"/>
            <OutputColumn id="v_IT_L5B_11_CELL_IT_v" quantity="IT_L5B/11/CELL_IT/v"/>
        </OutputFile>

        <OutputFile id="Volts_file__PT_L5B" fileName="Sim_M1_p_1percent.PT_L5B.v.dat">
            <OutputColumn id="v_PT_L5B_0_CELL_PT_v" quantity="PT_L5B/0/CELL_PT/v"/>
            <OutputColumn id="v_PT_L5B_1_CELL_PT_v" quantity="PT_L5B/1/CELL_PT/v"/>
            <OutputColumn id="v_PT_L5B_2_CELL_PT_v" quantity="PT_L5B/2/CELL_PT/v"/>
            <OutputColumn id="v_PT_L5B_3_CELL_PT_v" quantity="PT_L5B/3/CELL_PT/v"/>
            <OutputColumn id="v_PT_L5B_4_CELL_PT_v" quantity="PT_L5B/4/CELL_PT/v"/>
            <OutputColumn id="v_PT_L5B_5_CELL_PT_v" quantity="PT_L5B/5/CELL_PT/v"/>
            <OutputColumn id="v_PT_L5B_6_CELL_PT_v" quantity="PT_L5B/6/CELL_PT/v"/>
            <OutputColumn id="v_PT_L5B_7_CELL_PT_v" quantity="PT_L5B/7/CELL_PT/v"/>
            <OutputColumn id="v_PT_L5B_8_CELL_PT_v" quantity="PT_L5B/8/CELL_PT/v"/>
            <OutputColumn id="v_PT_L5B_9_CELL_PT_v" quantity="PT_L5B/9/CELL_PT/v"/>
            <OutputColumn id="v_PT_L5B_10_CELL_PT_v" quantity="PT_L5B/10/CELL_PT/v"/>
            <OutputColumn id="v_PT_L5B_11_CELL_PT_v" quantity="PT_L5B/11/CELL_PT/v"/>
        </OutputFile>

        <OutputFile id="Volts_file__IT_L6" fileName="Sim_M1_p_1percent.IT_L6.v.dat">
            <OutputColumn id="v_IT_L6_0_CELL_IT_v" quantity="IT_L6/0/CELL_IT/v"/>
            <OutputColumn id="v_IT_L6_1_CELL_IT_v" quantity="IT_L6/1/CELL_IT/v"/>
            <OutputColumn id="v_IT_L6_2_CELL_IT_v" quantity="IT_L6/2/CELL_IT/v"/>
            <OutputColumn id="v_IT_L6_3_CELL_IT_v" quantity="IT_L6/3/CELL_IT/v"/>
            <OutputColumn id="v_IT_L6_4_CELL_IT_v" quantity="IT_L6/4/CELL_IT/v"/>
            <OutputColumn id="v_IT_L6_5_CELL_IT_v" quantity="IT_L6/5/CELL_IT/v"/>
            <OutputColumn id="v_IT_L6_6_CELL_IT_v" quantity="IT_L6/6/CELL_IT/v"/>
            <OutputColumn id="v_IT_L6_7_CELL_IT_v" quantity="IT_L6/7/CELL_IT/v"/>
            <OutputColumn id="v_IT_L6_8_CELL_IT_v" quantity="IT_L6/8/CELL_IT/v"/>
            <OutputColumn id="v_IT_L6_9_CELL_IT_v" quantity="IT_L6/9/CELL_IT/v"/>
            <OutputColumn id="v_IT_L6_10_CELL_IT_v" quantity="IT_L6/10/CELL_IT/v"/>
        </OutputFile>

        <OutputFile id="Volts_file__CT_L6" fileName="Sim_M1_p_1percent.CT_L6.v.dat">
            <OutputColumn id="v_CT_L6_0_CELL_CT_v" quantity="CT_L6/0/CELL_CT/v"/>
            <OutputColumn id="v_CT_L6_1_CELL_CT_v" quantity="CT_L6/1/CELL_CT/v"/>
            <OutputColumn id="v_CT_L6_2_CELL_CT_v" quantity="CT_L6/2/CELL_CT/v"/>
            <OutputColumn id="v_CT_L6_3_CELL_CT_v" quantity="CT_L6/3/CELL_CT/v"/>
            <OutputColumn id="v_CT_L6_4_CELL_CT_v" quantity="CT_L6/4/CELL_CT/v"/>
            <OutputColumn id="v_CT_L6_5_CELL_CT_v" quantity="CT_L6/5/CELL_CT/v"/>
            <OutputColumn id="v_CT_L6_6_CELL_CT_v" quantity="CT_L6/6/CELL_CT/v"/>
            <OutputColumn id="v_CT_L6_7_CELL_CT_v" quantity="CT_L6/7/CELL_CT/v"/>
            <OutputColumn id="v_CT_L6_8_CELL_CT_v" quantity="CT_L6/8/CELL_CT/v"/>
            <OutputColumn id="v_CT_L6_9_CELL_CT_v" quantity="CT_L6/9/CELL_CT/v"/>
            <OutputColumn id="v_CT_L6_10_CELL_CT_v" quantity="CT_L6/10/CELL_CT/v"/>
        </OutputFile>

        <OutputFile id="Volts_file__PV_L23" fileName="Sim_M1_p_1percent.PV_L23.v.dat">
            <OutputColumn id="v_PV_L23_0_CELL_PV_v" quantity="PV_L23/0/CELL_PV/v"/>
            <OutputColumn id="v_PV_L23_1_CELL_PV_v" quantity="PV_L23/1/CELL_PV/v"/>
        </OutputFile>

        <OutputFile id="Volts_file__SOM_L23" fileName="Sim_M1_p_1percent.SOM_L23.v.dat">
            <OutputColumn id="v_SOM_L23_0_CELL_SOM_v" quantity="SOM_L23/0/CELL_SOM/v"/>
            <OutputColumn id="v_SOM_L23_1_CELL_SOM_v" quantity="SOM_L23/1/CELL_SOM/v"/>
        </OutputFile>

        <OutputFile id="Volts_file__PV_L5" fileName="Sim_M1_p_1percent.PV_L5.v.dat">
            <OutputColumn id="v_PV_L5_0_CELL_PV_v" quantity="PV_L5/0/CELL_PV/v"/>
            <OutputColumn id="v_PV_L5_1_CELL_PV_v" quantity="PV_L5/1/CELL_PV/v"/>
            <OutputColumn id="v_PV_L5_2_CELL_PV_v" quantity="PV_L5/2/CELL_PV/v"/>
            <OutputColumn id="v_PV_L5_3_CELL_PV_v" quantity="PV_L5/3/CELL_PV/v"/>
            <OutputColumn id="v_PV_L5_4_CELL_PV_v" quantity="PV_L5/4/CELL_PV/v"/>
        </OutputFile>

        <OutputFile id="Volts_file__SOM_L5" fileName="Sim_M1_p_1percent.SOM_L5.v.dat">
            <OutputColumn id="v_SOM_L5_0_CELL_SOM_v" quantity="SOM_L5/0/CELL_SOM/v"/>
            <OutputColumn id="v_SOM_L5_1_CELL_SOM_v" quantity="SOM_L5/1/CELL_SOM/v"/>
            <OutputColumn id="v_SOM_L5_2_CELL_SOM_v" quantity="SOM_L5/2/CELL_SOM/v"/>
            <OutputColumn id="v_SOM_L5_3_CELL_SOM_v" quantity="SOM_L5/3/CELL_SOM/v"/>
            <OutputColumn id="v_SOM_L5_4_CELL_SOM_v" quantity="SOM_L5/4/CELL_SOM/v"/>
        </OutputFile>

        <OutputFile id="Volts_file__PV_L6" fileName="Sim_M1_p_1percent.PV_L6.v.dat">
            <OutputColumn id="v_PV_L6_0_CELL_PV_v" quantity="PV_L6/0/CELL_PV/v"/>
            <OutputColumn id="v_PV_L6_1_CELL_PV_v" quantity="PV_L6/1/CELL_PV/v"/>
        </OutputFile>

        <OutputFile id="Volts_file__SOM_L6" fileName="Sim_M1_p_1percent.SOM_L6.v.dat">
            <OutputColumn id="v_SOM_L6_0_CELL_SOM_v" quantity="SOM_L6/0/CELL_SOM/v"/>
            <OutputColumn id="v_SOM_L6_1_CELL_SOM_v" quantity="SOM_L6/1/CELL_SOM/v"/>
        </OutputFile>

    </Simulation>

</Lems>
