<neuroml xmlns="http://www.neuroml.org/schema/neuroml2"  xmlns:xs="http://www.w3.org/2001/XMLSchema" xmlns:xsi="http://www.w3.org/2001/XMLSchema-instance" xsi:schemaLocation="http://www.neuroml.org/schema/neuroml2 https://raw.github.com/NeuroML/NeuroML2/development/Schemas/NeuroML2/NeuroML_v2.1.xsd" id="M1_1percent">
    <notes>NeuroML 2 file exported from NetPyNE v0.9.6</notes>
    <expTwoSynapse id="AMPA" gbase="1uS" erev="0mV" tauDecay="2.3ms" tauRise="0.05ms"/>
    <expTwoSynapse id="NMDA" gbase="1uS" erev="0mV" tauDecay="15ms" tauRise="0.15ms"/>
    <expTwoSynapse id="GABAA" gbase="1uS" erev="-80mV" tauDecay="9.1ms" tauRise="0.07ms"/>
    <expTwoSynapse id="GABAB" gbase="1uS" erev="-80mV" tauDecay="9.1ms" tauRise="0.07ms"/>
    <izhikevich2007Cell id="CELL_IT" C="100 pF" v0="-60 mV" k="0.7 nS_per_mV" vr="-60 mV" vt="-40 mV" vpeak="35 mV" a="0.03 per_ms" b="-2 nS" c="-50 mV" d="100 pA"/>
    <izhikevich2007Cell id="CELL_PT" C="150.0 pF" v0="-75 mV" k="1.2 nS_per_mV" vr="-75 mV" vt="-45 mV" vpeak="50 mV" a="0.01 per_ms" b="5 nS" c="-56 mV" d="130 pA"/>
    <izhikevich2007Cell id="CELL_CT" C="100 pF" v0="-60 mV" k="0.7 nS_per_mV" vr="-60 mV" vt="-40 mV" vpeak="35 mV" a="0.03 per_ms" b="-2 nS" c="-50 mV" d="100 pA"/>
    <izhikevich2007Cell id="CELL_PV" C="20.0 pF" v0="-55 mV" k="1.0 nS_per_mV" vr="-55 mV" vt="-40 mV" vpeak="25 mV" a="0.2 per_ms" b="-2 nS" c="-45 mV" d="-55 pA"/>
    <izhikevich2007Cell id="CELL_SOM" C="100.0 pF" v0="-56 mV" k="1.0 nS_per_mV" vr="-56 mV" vt="-42 mV" vpeak="40 mV" a="0.03 per_ms" b="8 nS" c="-53 mV" d="20 pA"/>
    <spikeGeneratorPoisson id="NetStim_background_E_IT_L23_10_1_AMPA" averageRate="10 Hz"/>
    <spikeGeneratorPoisson id="NetStim_background_E_IT_L4_10_1_AMPA" averageRate="10 Hz"/>
    <spikeGeneratorPoisson id="NetStim_background_E_IT_L5A_10_1_AMPA" averageRate="10 Hz"/>
    <spikeGeneratorPoisson id="NetStim_background_E_IT_L5B_10_1_AMPA" averageRate="10 Hz"/>
    <spikeGeneratorPoisson id="NetStim_background_E_PT_L5B_10_1_AMPA" averageRate="10 Hz"/>
    <spikeGeneratorPoisson id="NetStim_background_E_IT_L6_10_1_AMPA" averageRate="10 Hz"/>
    <spikeGeneratorPoisson id="NetStim_background_E_CT_L6_10_1_AMPA" averageRate="10 Hz"/>
    <spikeGeneratorPoisson id="NetStim_background_E_PV_L23_10_1_AMPA" averageRate="10 Hz"/>
    <spikeGeneratorPoisson id="NetStim_background_E_SOM_L23_10_1_AMPA" averageRate="10 Hz"/>
    <spikeGeneratorPoisson id="NetStim_background_E_PV_L5_10_1_AMPA" averageRate="10 Hz"/>
    <spikeGeneratorPoisson id="NetStim_background_E_SOM_L5_10_1_AMPA" averageRate="10 Hz"/>
    <spikeGeneratorPoisson id="NetStim_background_E_PV_L6_10_1_AMPA" averageRate="10 Hz"/>
    <spikeGeneratorPoisson id="NetStim_background_E_SOM_L6_10_1_AMPA" averageRate="10 Hz"/>
    <network id="M1_1percent">
        <population id="IT_L23" component="CELL_IT" size="18" type="populationList">
            <property tag="radius" value="5"/>
            <instance id="0">
                <location x="23.851469612249296" y="374.26960998650884" z="18.495964033413685"/>
            </instance>
            <instance id="1">
                <location x="2.674305787618667" y="298.526853365468128" z="0.710190650841642"/>
            </instance>
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        </population>
        <population id="IT_L4" component="CELL_IT" size="9" type="populationList">
            <property tag="radius" value="5"/>
            <instance id="0">
                <location x="21.481710322787588" y="433.566998525274244" z="15.711259367942981"/>
            </instance>
            <instance id="1">
                <location x="22.221448900592176" y="514.472693307331497" z="22.801775414775641"/>
            </instance>
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        </population>
        <population id="IT_L5A" component="CELL_IT" size="10" type="populationList">
            <property tag="radius" value="5"/>
            <instance id="0">
                <location x="10.387266112866982" y="615.619061415288797" z="5.855457806993402"/>
            </instance>
            <instance id="1">
                <location x="2.490611539108071" y="587.913190174984493" z="12.032422488082101"/>
            </instance>
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        </population>
        <population id="IT_L5B" component="CELL_IT" size="12" type="populationList">
            <property tag="radius" value="5"/>
            <instance id="0">
                <location x="23.782906454572707" y="958.483054564105714" z="28.733786093365918"/>
            </instance>
            <instance id="1">
                <location x="20.12566736430729" y="992.172970564995694" z="1.283147222995025"/>
            </instance>
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        </population>
        <population id="PT_L5B" component="CELL_PT" size="12" type="populationList">
            <property tag="radius" value="5"/>
            <instance id="0">
                <location x="1.810780169486352" y="856.071966051340155" z="5.431437630804386"/>
            </instance>
            <instance id="1">
                <location x="15.001152319600536" y="879.590069456470701" z="28.977258545584686"/>
            </instance>
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        </population>
        <population id="IT_L6" component="CELL_IT" size="11" type="populationList">
            <property tag="radius" value="5"/>
            <instance id="0">
                <location x="0.804724450967106" y="1117.174670383642706" z="16.080481783468166"/>
            </instance>
            <instance id="1">
                <location x="25.649170869577404" y="1250.663457787790321" z="9.442302747759431"/>
            </instance>
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        </population>
        <population id="CT_L6" component="CELL_CT" size="11" type="populationList">
            <property tag="radius" value="5"/>
            <instance id="0">
                <location x="16.689682368494179" y="1063.089097685974821" z="3.231529611341765"/>
            </instance>
            <instance id="1">
                <location x="4.113958216245762" y="1295.111226582175277" z="24.23259851424196"/>
            </instance>
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        </population>
        <population id="PV_L23" component="CELL_PV" size="2" type="populationList">
            <property tag="radius" value="5"/>
            <instance id="0">
                <location x="12.021670427168331" y="414.867533508602719" z="19.770580371895203"/>
            </instance>
            <instance id="1">
                <location x="16.65198677763064" y="322.573942733329261" z="12.374570504209361"/>
            </instance>
        </population>
        <population id="SOM_L23" component="CELL_SOM" size="2" type="populationList">
            <property tag="radius" value="5"/>
            <instance id="0">
                <location x="28.631101053061172" y="190.744936647418683" z="1.508158156297133"/>
            </instance>
            <instance id="1">
                <location x="14.034481334026324" y="271.843424212922514" z="3.129134710615237"/>
            </instance>
        </population>
        <population id="PV_L5" component="CELL_PV" size="5" type="populationList">
            <property tag="radius" value="5"/>
            <instance id="0">
                <location x="26.828292792935788" y="627.823358749197041" z="21.176656349288145"/>
            </instance>
            <instance id="1">
                <location x="28.341901100161046" y="933.688454100585432" z="8.289583567928155"/>
            </instance>
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        </population>
        <population id="SOM_L5" component="CELL_SOM" size="5" type="populationList">
            <property tag="radius" value="5"/>
            <instance id="0">
                <location x="18.798955870140588" y="715.888566892503604" z="23.181957573820384"/>
            </instance>
            <instance id="1">
                <location x="29.425324236642261" y="833.889991871456118" z="21.801767909945507"/>
            </instance>
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        </population>
        <population id="PV_L6" component="CELL_PV" size="2" type="populationList">
            <property tag="radius" value="5"/>
            <instance id="0">
                <location x="20.828003976301289" y="1290.470965099062141" z="15.492552366225851"/>
            </instance>
            <instance id="1">
                <location x="3.075697221077117" y="1202.535052381331298" z="10.650213525944805"/>
            </instance>
        </population>
        <population id="SOM_L6" component="CELL_SOM" size="2" type="populationList">
            <property tag="radius" value="5"/>
            <instance id="0">
                <location x="4.805376561171054" y="1328.415163121205978" z="21.935644687168381"/>
            </instance>
            <instance id="1">
                <location x="18.13321252396954" y="1125.607475555127621" z="18.99855120363679"/>
            </instance>
        </population>
        <population id="Pop_NetStim_background_E_IT_L23_10_1_AMPA" component="NetStim_background_E_IT_L23_10_1_AMPA" size="18"/>
        <population id="Pop_NetStim_background_E_IT_L4_10_1_AMPA" component="NetStim_background_E_IT_L4_10_1_AMPA" size="9"/>
        <population id="Pop_NetStim_background_E_IT_L5A_10_1_AMPA" component="NetStim_background_E_IT_L5A_10_1_AMPA" size="10"/>
        <population id="Pop_NetStim_background_E_IT_L5B_10_1_AMPA" component="NetStim_background_E_IT_L5B_10_1_AMPA" size="12"/>
        <population id="Pop_NetStim_background_E_PT_L5B_10_1_AMPA" component="NetStim_background_E_PT_L5B_10_1_AMPA" size="12"/>
        <population id="Pop_NetStim_background_E_IT_L6_10_1_AMPA" component="NetStim_background_E_IT_L6_10_1_AMPA" size="11"/>
        <population id="Pop_NetStim_background_E_CT_L6_10_1_AMPA" component="NetStim_background_E_CT_L6_10_1_AMPA" size="11"/>
        <population id="Pop_NetStim_background_E_PV_L23_10_1_AMPA" component="NetStim_background_E_PV_L23_10_1_AMPA" size="2"/>
        <population id="Pop_NetStim_background_E_SOM_L23_10_1_AMPA" component="NetStim_background_E_SOM_L23_10_1_AMPA" size="2"/>
        <population id="Pop_NetStim_background_E_PV_L5_10_1_AMPA" component="NetStim_background_E_PV_L5_10_1_AMPA" size="5"/>
        <population id="Pop_NetStim_background_E_SOM_L5_10_1_AMPA" component="NetStim_background_E_SOM_L5_10_1_AMPA" size="5"/>
        <population id="Pop_NetStim_background_E_PV_L6_10_1_AMPA" component="NetStim_background_E_PV_L6_10_1_AMPA" size="2"/>
        <population id="Pop_NetStim_background_E_SOM_L6_10_1_AMPA" component="NetStim_background_E_SOM_L6_10_1_AMPA" size="2"/>
        <projection id="NetConn_SOM_L23_IT_L23_GABAB" presynapticPopulation="SOM_L23" postsynapticPopulation="IT_L23" synapse="GABAB">
            <connectionWD id="0" preCellId="../SOM_L23/1/CELL_SOM" postCellId="../IT_L23/0/CELL_IT" weight="0.00015" delay="3.0403670618784506 ms"/>
            <connectionWD id="1" preCellId="../SOM_L23/1/CELL_SOM" postCellId="../IT_L23/1/CELL_IT" weight="0.00015" delay="2.291017228037866 ms"/>
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        </projection>
        <projection id="NetConn_PV_L23_IT_L23_GABAA" presynapticPopulation="PV_L23" postsynapticPopulation="IT_L23" synapse="GABAA">
            <connectionWD id="0" preCellId="../PV_L23/1/CELL_PV" postCellId="../IT_L23/0/CELL_IT" weight="0.00015" delay="2.5255231702386505 ms"/>
            <connectionWD id="1" preCellId="../PV_L23/0/CELL_PV" postCellId="../IT_L23/1/CELL_IT" weight="0.00015" delay="3.1826168245966358 ms"/>
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        </projection>
        <projection id="NetConn_IT_L5A_IT_L23_AMPA" presynapticPopulation="IT_L5A" postsynapticPopulation="IT_L23" synapse="AMPA">
            <connectionWD id="0" preCellId="../IT_L5A/3/CELL_IT" postCellId="../IT_L23/4/CELL_IT" weight="0.000201" delay="5.2321073414630614 ms"/>
            <connectionWD id="1" preCellId="../IT_L5A/4/CELL_IT" postCellId="../IT_L23/7/CELL_IT" weight="0.000144" delay="4.328910950373935 ms"/>
            <connectionWD id="2" preCellId="../IT_L5A/0/CELL_IT" postCellId="../IT_L23/12/CELL_IT" weight="0.000144" delay="4.100720247784304 ms"/>
            <connectionWD id="3" preCellId="../IT_L5A/2/CELL_IT" postCellId="../IT_L23/15/CELL_IT" weight="0.000201" delay="4.858320665001939 ms"/>
        </projection>
        <projection id="NetConn_IT_L23_IT_L23_AMPA" presynapticPopulation="IT_L23" postsynapticPopulation="IT_L23" synapse="AMPA">
            <connectionWD id="0" preCellId="../IT_L23/13/CELL_IT" postCellId="../IT_L23/5/CELL_IT" weight="0.000132" delay="3.1444341228807584 ms"/>
            <connectionWD id="1" preCellId="../IT_L23/8/CELL_IT" postCellId="../IT_L23/5/CELL_IT" weight="0.000234" delay="2.4452915897635354 ms"/>
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        </projection>
        <projection id="NetConn_IT_L4_IT_L23_AMPA" presynapticPopulation="IT_L4" postsynapticPopulation="IT_L23" synapse="AMPA">
            <connectionWD id="0" preCellId="../IT_L4/8/CELL_IT" postCellId="../IT_L23/6/CELL_IT" weight="0.000294" delay="4.358791009853677 ms"/>
            <connectionWD id="1" preCellId="../IT_L4/0/CELL_IT" postCellId="../IT_L23/7/CELL_IT" weight="0.000285" delay="2.234470286498528 ms"/>
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        </projection>
        <projection id="NetConn_IT_L5B_IT_L23_AMPA" presynapticPopulation="IT_L5B" postsynapticPopulation="IT_L23" synapse="AMPA">
            <connectionWD id="0" preCellId="../IT_L5B/9/CELL_IT" postCellId="../IT_L23/6/CELL_IT" weight="0.000063" delay="7.918239589333703 ms"/>
            <connectionWD id="1" preCellId="../IT_L5B/11/CELL_IT" postCellId="../IT_L23/7/CELL_IT" weight="0.000051" delay="6.996992205742018 ms"/>
        </projection>
        <projection id="NetConn_CT_L6_IT_L23_AMPA" presynapticPopulation="CT_L6" postsynapticPopulation="IT_L23" synapse="AMPA">
            <connectionWD id="0" preCellId="../CT_L6/0/CELL_CT" postCellId="../IT_L23/7/CELL_IT" weight="0.000051" delay="8.488124675213179 ms"/>
        </projection>
        <projection id="NetConn_IT_L4_IT_L4_AMPA" presynapticPopulation="IT_L4" postsynapticPopulation="IT_L4" synapse="AMPA">
            <connectionWD id="0" preCellId="../IT_L4/1/CELL_IT" postCellId="../IT_L4/0/CELL_IT" weight="0.000285" delay="2.8121917310057576 ms"/>
            <connectionWD id="1" preCellId="../IT_L4/2/CELL_IT" postCellId="../IT_L4/1/CELL_IT" weight="0.000285" delay="2.9240855843379623 ms"/>
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        </projection>
        <projection id="NetConn_IT_L5B_IT_L4_AMPA" presynapticPopulation="IT_L5B" postsynapticPopulation="IT_L4" synapse="AMPA">
            <connectionWD id="0" preCellId="../IT_L5B/9/CELL_IT" postCellId="../IT_L4/0/CELL_IT" weight="0.000051" delay="5.4924923715058664 ms"/>
            <connectionWD id="1" preCellId="../IT_L5B/3/CELL_IT" postCellId="../IT_L4/3/CELL_IT" weight="0.0000615" delay="5.635033831613962 ms"/>
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        </projection>
        <projection id="NetConn_IT_L23_IT_L4_AMPA" presynapticPopulation="IT_L23" postsynapticPopulation="IT_L4" synapse="AMPA">
            <connectionWD id="0" preCellId="../IT_L23/15/CELL_IT" postCellId="../IT_L4/0/CELL_IT" weight="0.000108" delay="3.448301276381929 ms"/>
            <connectionWD id="1" preCellId="../IT_L23/11/CELL_IT" postCellId="../IT_L4/1/CELL_IT" weight="0.000093" delay="4.779887166497973 ms"/>
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        </projection>
        <projection id="NetConn_PV_L5_IT_L4_GABAA" presynapticPopulation="PV_L5" postsynapticPopulation="IT_L4" synapse="GABAA">
            <connectionWD id="0" preCellId="../PV_L5/2/CELL_PV" postCellId="../IT_L4/0/CELL_IT" weight="0.00015" delay="2.2232641787916934 ms"/>
            <connectionWD id="1" preCellId="../PV_L5/2/CELL_PV" postCellId="../IT_L4/2/CELL_IT" weight="0.00015" delay="2.3323889162269973 ms"/>
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        </projection>
        <projection id="NetConn_IT_L5A_IT_L4_AMPA" presynapticPopulation="IT_L5A" postsynapticPopulation="IT_L4" synapse="AMPA">
            <connectionWD id="0" preCellId="../IT_L5A/8/CELL_IT" postCellId="../IT_L4/1/CELL_IT" weight="0.000171" delay="3.3700346908645518 ms"/>
            <connectionWD id="1" preCellId="../IT_L5A/9/CELL_IT" postCellId="../IT_L4/1/CELL_IT" weight="0.000171" delay="2.946114813942562 ms"/>
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        </projection>
        <projection id="NetConn_PT_L5B_IT_L4_AMPA" presynapticPopulation="PT_L5B" postsynapticPopulation="IT_L4" synapse="AMPA">
            <connectionWD id="0" preCellId="../PT_L5B/7/CELL_PT" postCellId="../IT_L4/1/CELL_IT" weight="0.0000615" delay="4.441671114876854 ms"/>
            <connectionWD id="1" preCellId="../PT_L5B/5/CELL_PT" postCellId="../IT_L4/3/CELL_IT" weight="0.0000615" delay="5.676899179211057 ms"/>
            <connectionWD id="2" preCellId="../PT_L5B/3/CELL_PT" postCellId="../IT_L4/5/CELL_IT" weight="0.0000615" delay="5.810894974861477 ms"/>
        </projection>
        <projection id="NetConn_IT_L6_IT_L4_AMPA" presynapticPopulation="IT_L6" postsynapticPopulation="IT_L4" synapse="AMPA">
            <connectionWD id="0" preCellId="../IT_L6/9/CELL_IT" postCellId="../IT_L4/1/CELL_IT" weight="0.000012" delay="8.809501521793884 ms"/>
            <connectionWD id="1" preCellId="../IT_L6/2/CELL_IT" postCellId="../IT_L4/4/CELL_IT" weight="0.000012" delay="8.83418467750366 ms"/>
        </projection>
        <projection id="NetConn_CT_L6_IT_L4_AMPA" presynapticPopulation="CT_L6" postsynapticPopulation="IT_L4" synapse="AMPA">
            <connectionWD id="0" preCellId="../CT_L6/3/CELL_CT" postCellId="../IT_L4/5/CELL_IT" weight="0.000012" delay="8.523950485377156 ms"/>
            <connectionWD id="1" preCellId="../CT_L6/4/CELL_CT" postCellId="../IT_L4/7/CELL_IT" weight="0.000012" delay="8.10515377984888 ms"/>
            <connectionWD id="2" preCellId="../CT_L6/7/CELL_CT" postCellId="../IT_L4/7/CELL_IT" weight="0.000012" delay="7.999227204288127 ms"/>
        </projection>
        <projection id="NetConn_IT_L5A_IT_L5A_AMPA" presynapticPopulation="IT_L5A" postsynapticPopulation="IT_L5A" synapse="AMPA">
            <connectionWD id="0" preCellId="../IT_L5A/9/CELL_IT" postCellId="../IT_L5A/0/CELL_IT" weight="0.000198" delay="2.199847430902349 ms"/>
            <connectionWD id="1" preCellId="../IT_L5A/8/CELL_IT" postCellId="../IT_L5A/3/CELL_IT" weight="0.000198" delay="2.159649685576934 ms"/>
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        </projection>
        <projection id="NetConn_PT_L5B_IT_L5A_AMPA" presynapticPopulation="PT_L5B" postsynapticPopulation="IT_L5A" synapse="AMPA">
            <connectionWD id="0" preCellId="../PT_L5B/9/CELL_PT" postCellId="../IT_L5A/0/CELL_IT" weight="0.000072" delay="5.246405101924283 ms"/>
            <connectionWD id="1" preCellId="../PT_L5B/7/CELL_PT" postCellId="../IT_L5A/6/CELL_IT" weight="0.000072" delay="2.9775294995133526 ms"/>
        </projection>
        <projection id="NetConn_PV_L5_IT_L5A_GABAA" presynapticPopulation="PV_L5" postsynapticPopulation="IT_L5A" synapse="GABAA">
            <connectionWD id="0" preCellId="../PV_L5/0/CELL_PV" postCellId="../IT_L5A/0/CELL_IT" weight="0.00015" delay="2.255732547103725 ms"/>
            <connectionWD id="1" preCellId="../PV_L5/3/CELL_PV" postCellId="../IT_L5A/0/CELL_IT" weight="0.00015" delay="2.2970577722861876 ms"/>
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        </projection>
        <projection id="NetConn_IT_L23_IT_L5A_AMPA" presynapticPopulation="IT_L23" postsynapticPopulation="IT_L5A" synapse="AMPA">
            <connectionWD id="0" preCellId="../IT_L23/13/CELL_IT" postCellId="../IT_L5A/1/CELL_IT" weight="0.000129" delay="5.728094595261479 ms"/>
            <connectionWD id="1" preCellId="../IT_L23/17/CELL_IT" postCellId="../IT_L5A/1/CELL_IT" weight="0.000129" delay="6.1022435117855425 ms"/>
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        </projection>
        <projection id="NetConn_IT_L4_IT_L5A_AMPA" presynapticPopulation="IT_L4" postsynapticPopulation="IT_L5A" synapse="AMPA">
            <connectionWD id="0" preCellId="../IT_L4/3/CELL_IT" postCellId="../IT_L5A/1/CELL_IT" weight="0.00019725" delay="2.660971820820449 ms"/>
            <connectionWD id="1" preCellId="../IT_L4/4/CELL_IT" postCellId="../IT_L5A/1/CELL_IT" weight="0.00019725" delay="2.6888020656800182 ms"/>
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        </projection>
        <projection id="NetConn_SOM_L5_IT_L5A_GABAB" presynapticPopulation="SOM_L5" postsynapticPopulation="IT_L5A" synapse="GABAB">
            <connectionWD id="0" preCellId="../SOM_L5/0/CELL_SOM" postCellId="../IT_L5A/1/CELL_IT" weight="0.00015" delay="3.2949120152905587 ms"/>
            <connectionWD id="1" preCellId="../SOM_L5/0/CELL_SOM" postCellId="../IT_L5A/3/CELL_IT" weight="0.00015" delay="2.747256626965134 ms"/>
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        </projection>
        <projection id="NetConn_CT_L6_IT_L5A_AMPA" presynapticPopulation="CT_L6" postsynapticPopulation="IT_L5A" synapse="AMPA">
            <connectionWD id="0" preCellId="../CT_L6/4/CELL_CT" postCellId="../IT_L5A/2/CELL_IT" weight="0.000012" delay="7.5769827775490945 ms"/>
            <connectionWD id="1" preCellId="../CT_L6/4/CELL_CT" postCellId="../IT_L5A/6/CELL_IT" weight="0.000024" delay="6.702993131149679 ms"/>
            <connectionWD id="2" preCellId="../CT_L6/6/CELL_CT" postCellId="../IT_L5A/9/CELL_IT" weight="0.000024" delay="7.373848131953553 ms"/>
        </projection>
        <projection id="NetConn_IT_L5B_IT_L5A_AMPA" presynapticPopulation="IT_L5B" postsynapticPopulation="IT_L5A" synapse="AMPA">
            <connectionWD id="0" preCellId="../IT_L5B/7/CELL_IT" postCellId="../IT_L5A/3/CELL_IT" weight="0.000072" delay="2.834577068514885 ms"/>
            <connectionWD id="1" preCellId="../IT_L5B/4/CELL_IT" postCellId="../IT_L5A/8/CELL_IT" weight="0.000072" delay="2.6949201767525106 ms"/>
            <connectionWD id="2" preCellId="../IT_L5B/6/CELL_IT" postCellId="../IT_L5A/9/CELL_IT" weight="0.000072" delay="5.1412935758751495 ms"/>
        </projection>
        <projection id="NetConn_IT_L6_IT_L5A_AMPA" presynapticPopulation="IT_L6" postsynapticPopulation="IT_L5A" synapse="AMPA">
            <connectionWD id="0" preCellId="../IT_L6/1/CELL_IT" postCellId="../IT_L5A/6/CELL_IT" weight="0.000024" delay="7.889897217525666 ms"/>
            <connectionWD id="1" preCellId="../IT_L6/9/CELL_IT" postCellId="../IT_L5A/6/CELL_IT" weight="0.000024" delay="7.338093633579936 ms"/>
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        </projection>
        <projection id="NetConn_IT_L5B_IT_L5B_AMPA" presynapticPopulation="IT_L5B" postsynapticPopulation="IT_L5B" synapse="AMPA">
            <connectionWD id="0" preCellId="../IT_L5B/9/CELL_IT" postCellId="../IT_L5B/0/CELL_IT" weight="0.000213" delay="3.7636796769973824 ms"/>
            <connectionWD id="1" preCellId="../IT_L5B/10/CELL_IT" postCellId="../IT_L5B/1/CELL_IT" weight="0.000213" delay="4.248389750011946 ms"/>
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        </projection>
        <projection id="NetConn_IT_L6_IT_L5B_AMPA" presynapticPopulation="IT_L6" postsynapticPopulation="IT_L5B" synapse="AMPA">
            <connectionWD id="0" preCellId="../IT_L6/1/CELL_IT" postCellId="../IT_L5B/0/CELL_IT" weight="0.00009" delay="4.928225269689738 ms"/>
            <connectionWD id="1" preCellId="../IT_L6/2/CELL_IT" postCellId="../IT_L5B/1/CELL_IT" weight="0.00009" delay="4.136246225302674 ms"/>
            <connectionWD id="2" preCellId="../IT_L6/3/CELL_IT" postCellId="../IT_L5B/3/CELL_IT" weight="0.00009" delay="4.875485579746961 ms"/>
        </projection>
        <projection id="NetConn_SOM_L5_IT_L5B_GABAB" presynapticPopulation="SOM_L5" postsynapticPopulation="IT_L5B" synapse="GABAB">
            <connectionWD id="0" preCellId="../SOM_L5/2/CELL_SOM" postCellId="../IT_L5B/0/CELL_IT" weight="0.00015" delay="2.325251079373606 ms"/>
            <connectionWD id="1" preCellId="../SOM_L5/3/CELL_SOM" postCellId="../IT_L5B/0/CELL_IT" weight="0.00015" delay="2.1989955512462886 ms"/>
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        </projection>
        <projection id="NetConn_PV_L5_IT_L5B_GABAA" presynapticPopulation="PV_L5" postsynapticPopulation="IT_L5B" synapse="GABAA">
            <connectionWD id="0" preCellId="../PV_L5/4/CELL_PV" postCellId="../IT_L5B/0/CELL_IT" weight="0.00015" delay="2.2140580667418472 ms"/>
            <connectionWD id="1" preCellId="../PV_L5/1/CELL_PV" postCellId="../IT_L5B/1/CELL_IT" weight="0.00015" delay="2.594729796893821 ms"/>
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        </projection>
        <projection id="NetConn_IT_L23_IT_L5B_AMPA" presynapticPopulation="IT_L23" postsynapticPopulation="IT_L5B" synapse="AMPA">
            <connectionWD id="0" preCellId="../IT_L23/13/CELL_IT" postCellId="../IT_L5B/1/CELL_IT" weight="0.000066" delay="9.763771450381267 ms"/>
            <connectionWD id="1" preCellId="../IT_L23/8/CELL_IT" postCellId="../IT_L5B/7/CELL_IT" weight="0.000303" delay="6.4055958440080625 ms"/>
            <connectionWD id="2" preCellId="../IT_L23/13/CELL_IT" postCellId="../IT_L5B/8/CELL_IT" weight="0.000066" delay="8.454657069883535 ms"/>
        </projection>
        <projection id="NetConn_IT_L5A_IT_L5B_AMPA" presynapticPopulation="IT_L5A" postsynapticPopulation="IT_L5B" synapse="AMPA">
            <connectionWD id="0" preCellId="../IT_L5A/3/CELL_IT" postCellId="../IT_L5B/1/CELL_IT" weight="0.000264" delay="5.50933018081726 ms"/>
            <connectionWD id="1" preCellId="../IT_L5A/6/CELL_IT" postCellId="../IT_L5B/7/CELL_IT" weight="0.000264" delay="2.6333135440819015 ms"/>
        </projection>
        <projection id="NetConn_PT_L5B_IT_L5B_AMPA" presynapticPopulation="PT_L5B" postsynapticPopulation="IT_L5B" synapse="AMPA">
            <connectionWD id="0" preCellId="../PT_L5B/10/CELL_PT" postCellId="../IT_L5B/2/CELL_IT" weight="0.000213" delay="3.0225831423603733 ms"/>
            <connectionWD id="1" preCellId="../PT_L5B/8/CELL_PT" postCellId="../IT_L5B/3/CELL_IT" weight="0.000213" delay="3.209728706556418 ms"/>
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        </projection>
        <projection id="NetConn_CT_L6_IT_L5B_AMPA" presynapticPopulation="CT_L6" postsynapticPopulation="IT_L5B" synapse="AMPA">
            <connectionWD id="0" preCellId="../CT_L6/2/CELL_CT" postCellId="../IT_L5B/2/CELL_IT" weight="0.00009" delay="5.969521049706991 ms"/>
            <connectionWD id="1" preCellId="../CT_L6/2/CELL_CT" postCellId="../IT_L5B/3/CELL_IT" weight="0.00009" delay="6.462147650288247 ms"/>
            <connectionWD id="2" preCellId="../CT_L6/5/CELL_CT" postCellId="../IT_L5B/10/CELL_IT" weight="0.00009" delay="7.266921808450205 ms"/>
        </projection>
        <projection id="NetConn_IT_L5B_PT_L5B_AMPA" presynapticPopulation="IT_L5B" postsynapticPopulation="PT_L5B" synapse="AMPA">
            <connectionWD id="0" preCellId="../IT_L5B/9/CELL_IT" postCellId="../PT_L5B/0/CELL_PT" weight="0.000213" delay="2.766626868376687 ms"/>
            <connectionWD id="1" preCellId="../IT_L5B/2/CELL_IT" postCellId="../PT_L5B/0/CELL_PT" weight="0.000213" delay="2.8250082811085466 ms"/>
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        </projection>
        <projection id="NetConn_SOM_L5_PT_L5B_GABAB" presynapticPopulation="SOM_L5" postsynapticPopulation="PT_L5B" synapse="GABAB">
            <connectionWD id="0" preCellId="../SOM_L5/0/CELL_SOM" postCellId="../PT_L5B/0/CELL_PT" weight="0.00015" delay="3.423202883344796 ms"/>
            <connectionWD id="1" preCellId="../SOM_L5/1/CELL_SOM" postCellId="../PT_L5B/0/CELL_PT" weight="0.00015" delay="2.390203887218221 ms"/>
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        </projection>
        <projection id="NetConn_PV_L5_PT_L5B_GABAA" presynapticPopulation="PV_L5" postsynapticPopulation="PT_L5B" synapse="GABAA">
            <connectionWD id="0" preCellId="../PV_L5/1/CELL_PV" postCellId="../PT_L5B/0/CELL_PT" weight="0.00015" delay="2.8207550543941 ms"/>
            <connectionWD id="1" preCellId="../PV_L5/4/CELL_PV" postCellId="../PT_L5B/0/CELL_PT" weight="0.00015" delay="3.091977615378255 ms"/>
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        </projection>
        <projection id="NetConn_IT_L23_PT_L5B_AMPA" presynapticPopulation="IT_L23" postsynapticPopulation="PT_L5B" synapse="AMPA">
            <connectionWD id="0" preCellId="../IT_L23/2/CELL_IT" postCellId="../PT_L5B/1/CELL_PT" weight="0.000066" delay="8.31209099067178 ms"/>
            <connectionWD id="1" preCellId="../IT_L23/2/CELL_IT" postCellId="../PT_L5B/2/CELL_PT" weight="0.000066" delay="7.319208994676545 ms"/>
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        </projection>
        <projection id="NetConn_CT_L6_PT_L5B_AMPA" presynapticPopulation="CT_L6" postsynapticPopulation="PT_L5B" synapse="AMPA">
            <connectionWD id="0" preCellId="../CT_L6/4/CELL_CT" postCellId="../PT_L5B/1/CELL_PT" weight="0.00009" delay="4.526110074270512 ms"/>
            <connectionWD id="1" preCellId="../CT_L6/7/CELL_CT" postCellId="../PT_L5B/3/CELL_PT" weight="0.00009" delay="4.035753425641848 ms"/>
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        </projection>
        <projection id="NetConn_IT_L5A_PT_L5B_AMPA" presynapticPopulation="IT_L5A" postsynapticPopulation="PT_L5B" synapse="AMPA">
            <connectionWD id="0" preCellId="../IT_L5A/4/CELL_IT" postCellId="../PT_L5B/6/CELL_PT" weight="0.000264" delay="3.581080540759494 ms"/>
        </projection>
        <projection id="NetConn_IT_L6_PT_L5B_AMPA" presynapticPopulation="IT_L6" postsynapticPopulation="PT_L5B" synapse="AMPA">
            <connectionWD id="0" preCellId="../IT_L6/3/CELL_IT" postCellId="../PT_L5B/11/CELL_PT" weight="0.00009" delay="3.787308017595115 ms"/>
        </projection>
        <projection id="NetConn_SOM_L6_IT_L6_GABAB" presynapticPopulation="SOM_L6" postsynapticPopulation="IT_L6" synapse="GABAB">
            <connectionWD id="0" preCellId="../SOM_L6/1/CELL_SOM" postCellId="../IT_L6/0/CELL_IT" weight="0.00015" delay="2.1949112185322677 ms"/>
            <connectionWD id="1" preCellId="../SOM_L6/0/CELL_SOM" postCellId="../IT_L6/1/CELL_IT" weight="0.00015" delay="2.8146088040428023 ms"/>
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        </projection>
        <projection id="NetConn_PV_L6_IT_L6_GABAA" presynapticPopulation="PV_L6" postsynapticPopulation="IT_L6" synapse="GABAA">
            <connectionWD id="0" preCellId="../PV_L6/0/CELL_PV" postCellId="../IT_L6/0/CELL_IT" weight="0.00015" delay="3.744502311435638 ms"/>
            <connectionWD id="1" preCellId="../PV_L6/1/CELL_PV" postCellId="../IT_L6/0/CELL_IT" weight="0.00015" delay="2.8556307582983775 ms"/>
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        </projection>
        <projection id="NetConn_IT_L5B_IT_L6_AMPA" presynapticPopulation="IT_L5B" postsynapticPopulation="IT_L6" synapse="AMPA">
            <connectionWD id="0" preCellId="../IT_L5B/4/CELL_IT" postCellId="../IT_L6/4/CELL_IT" weight="0.000147" delay="6.9295850070167715 ms"/>
        </projection>
        <projection id="NetConn_IT_L6_IT_L6_AMPA" presynapticPopulation="IT_L6" postsynapticPopulation="IT_L6" synapse="AMPA">
            <connectionWD id="0" preCellId="../IT_L6/6/CELL_IT" postCellId="../IT_L6/5/CELL_IT" weight="0.000159" delay="2.233102312277612 ms"/>
            <connectionWD id="1" preCellId="../IT_L6/1/CELL_IT" postCellId="../IT_L6/6/CELL_IT" weight="0.000159" delay="2.2002294093209014 ms"/>
        </projection>
        <projection id="NetConn_CT_L6_IT_L6_AMPA" presynapticPopulation="CT_L6" postsynapticPopulation="IT_L6" synapse="AMPA">
            <connectionWD id="0" preCellId="../CT_L6/7/CELL_CT" postCellId="../IT_L6/8/CELL_IT" weight="0.000159" delay="4.107318494173381 ms"/>
            <connectionWD id="1" preCellId="../CT_L6/6/CELL_CT" postCellId="../IT_L6/9/CELL_IT" weight="0.000159" delay="2.517565457314675 ms"/>
        </projection>
        <projection id="NetConn_IT_L5B_CT_L6_AMPA" presynapticPopulation="IT_L5B" postsynapticPopulation="CT_L6" synapse="AMPA">
            <connectionWD id="0" preCellId="../IT_L5B/8/CELL_IT" postCellId="../CT_L6/1/CELL_CT" weight="0.000147" delay="6.344536951735867 ms"/>
            <connectionWD id="1" preCellId="../IT_L5B/8/CELL_IT" postCellId="../CT_L6/4/CELL_CT" weight="0.000147" delay="4.71324973417647 ms"/>
            <connectionWD id="2" preCellId="../IT_L5B/8/CELL_IT" postCellId="../CT_L6/6/CELL_CT" weight="0.000147" delay="4.82606889170084 ms"/>
            <connectionWD id="3" preCellId="../IT_L5B/3/CELL_IT" postCellId="../CT_L6/9/CELL_CT" weight="0.000147" delay="5.332375431798168 ms"/>
        </projection>
        <projection id="NetConn_CT_L6_CT_L6_AMPA" presynapticPopulation="CT_L6" postsynapticPopulation="CT_L6" synapse="AMPA">
            <connectionWD id="0" preCellId="../CT_L6/0/CELL_CT" postCellId="../CT_L6/1/CELL_CT" weight="0.000147" delay="4.33309798402345 ms"/>
            <connectionWD id="1" preCellId="../CT_L6/8/CELL_CT" postCellId="../CT_L6/2/CELL_CT" weight="0.000159" delay="3.8304940397112093 ms"/>
            <connectionWD id="2" preCellId="../CT_L6/4/CELL_CT" postCellId="../CT_L6/9/CELL_CT" weight="0.000159" delay="2.8712812006715662 ms"/>
        </projection>
        <projection id="NetConn_IT_L6_CT_L6_AMPA" presynapticPopulation="IT_L6" postsynapticPopulation="CT_L6" synapse="AMPA">
            <connectionWD id="0" preCellId="../IT_L6/5/CELL_IT" postCellId="../CT_L6/1/CELL_CT" weight="0.000159" delay="2.2499803159251366 ms"/>
            <connectionWD id="1" preCellId="../IT_L6/7/CELL_IT" postCellId="../CT_L6/1/CELL_CT" weight="0.000159" delay="2.4203650769813874 ms"/>
            <connectionWD id="2" preCellId="../IT_L6/2/CELL_IT" postCellId="../CT_L6/5/CELL_CT" weight="0.000159" delay="2.9115268938064807 ms"/>
        </projection>
        <projection id="NetConn_SOM_L6_CT_L6_GABAB" presynapticPopulation="SOM_L6" postsynapticPopulation="CT_L6" synapse="GABAB">
            <connectionWD id="0" preCellId="../SOM_L6/0/CELL_SOM" postCellId="../CT_L6/1/CELL_CT" weight="0.00015" delay="2.333902118173454 ms"/>
            <connectionWD id="1" preCellId="../SOM_L6/0/CELL_SOM" postCellId="../CT_L6/2/CELL_CT" weight="0.00015" delay="2.2398474971003135 ms"/>
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        </projection>
        <projection id="NetConn_PV_L6_CT_L6_GABAA" presynapticPopulation="PV_L6" postsynapticPopulation="CT_L6" synapse="GABAA">
            <connectionWD id="0" preCellId="../PV_L6/0/CELL_PV" postCellId="../CT_L6/1/CELL_CT" weight="0.00015" delay="2.1942369066295964 ms"/>
            <connectionWD id="1" preCellId="../PV_L6/1/CELL_PV" postCellId="../CT_L6/1/CELL_CT" weight="0.00015" delay="2.9357300464091884 ms"/>
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        </projection>
        <projection id="NetConn_IT_L23_PV_L23_AMPA" presynapticPopulation="IT_L23" postsynapticPopulation="PV_L23" synapse="AMPA">
            <connectionWD id="0" preCellId="../IT_L23/7/CELL_IT" postCellId="../PV_L23/0/CELL_PV" weight="0.000234" delay="2.138026370792942 ms"/>
            <connectionWD id="1" preCellId="../IT_L23/9/CELL_IT" postCellId="../PV_L23/0/CELL_PV" weight="0.000234" delay="3.1100441520095243 ms"/>
            <connectionWD id="2" preCellId="../IT_L23/17/CELL_IT" postCellId="../PV_L23/0/CELL_PV" weight="0.000234" delay="4.376496022182133 ms"/>
            <connectionWD id="3" preCellId="../IT_L23/9/CELL_IT" postCellId="../PV_L23/1/CELL_PV" weight="0.000234" delay="2.1907761643923562 ms"/>
        </projection>
        <projection id="NetConn_PV_L23_PV_L23_GABAA" presynapticPopulation="PV_L23" postsynapticPopulation="PV_L23" synapse="GABAA">
            <connectionWD id="0" preCellId="../PV_L23/1/CELL_PV" postCellId="../PV_L23/0/CELL_PV" weight="0.00015" delay="2.9270516538824527 ms"/>
        </projection>
        <projection id="NetConn_PT_L5B_PV_L23_AMPA" presynapticPopulation="PT_L5B" postsynapticPopulation="PV_L23" synapse="AMPA">
            <connectionWD id="0" preCellId="../PT_L5B/9/CELL_PT" postCellId="../PV_L23/1/CELL_PV" weight="0.00010875" delay="8.178011142765882 ms"/>
        </projection>
        <projection id="NetConn_SOM_L23_PV_L23_GABAB" presynapticPopulation="SOM_L23" postsynapticPopulation="PV_L23" synapse="GABAB">
            <connectionWD id="0" preCellId="../SOM_L23/0/CELL_SOM" postCellId="../PV_L23/1/CELL_PV" weight="0.00015" delay="3.3281741204276543 ms"/>
        </projection>
        <projection id="NetConn_IT_L23_SOM_L23_AMPA" presynapticPopulation="IT_L23" postsynapticPopulation="SOM_L23" synapse="AMPA">
            <connectionWD id="0" preCellId="../IT_L23/3/CELL_IT" postCellId="../SOM_L23/0/CELL_SOM" weight="0.000234" delay="2.394009129933371 ms"/>
            <connectionWD id="1" preCellId="../IT_L23/5/CELL_IT" postCellId="../SOM_L23/1/CELL_SOM" weight="0.000234" delay="2.6277710750414034 ms"/>
            <connectionWD id="2" preCellId="../IT_L23/13/CELL_IT" postCellId="../SOM_L23/1/CELL_SOM" weight="0.000234" delay="2.587964969363881 ms"/>
        </projection>
        <projection id="NetConn_PV_L23_SOM_L23_GABAA" presynapticPopulation="PV_L23" postsynapticPopulation="SOM_L23" synapse="GABAA">
            <connectionWD id="0" preCellId="../PV_L23/0/CELL_PV" postCellId="../SOM_L23/0/CELL_SOM" weight="0.00015" delay="4.254779982053636 ms"/>
            <connectionWD id="1" preCellId="../PV_L23/1/CELL_PV" postCellId="../SOM_L23/1/CELL_SOM" weight="0.00015" delay="2.5163249874943205 ms"/>
        </projection>
        <projection id="NetConn_IT_L23_PV_L5_AMPA" presynapticPopulation="IT_L23" postsynapticPopulation="PV_L5" synapse="AMPA">
            <connectionWD id="0" preCellId="../IT_L23/9/CELL_IT" postCellId="../PV_L5/0/CELL_PV" weight="0.000033" delay="5.239258542604073 ms"/>
            <connectionWD id="1" preCellId="../IT_L23/14/CELL_IT" postCellId="../PV_L5/0/CELL_PV" weight="0.000033" delay="4.512002354231169 ms"/>
            <connectionWD id="2" preCellId="../IT_L23/7/CELL_IT" postCellId="../PV_L5/2/CELL_PV" weight="0.000033" delay="2.456666693043521 ms"/>
            <connectionWD id="3" preCellId="../IT_L23/17/CELL_IT" postCellId="../PV_L5/2/CELL_PV" weight="0.000033" delay="4.751171279137408 ms"/>
        </projection>
        <projection id="NetConn_IT_L4_PV_L5_AMPA" presynapticPopulation="IT_L4" postsynapticPopulation="PV_L5" synapse="AMPA">
            <connectionWD id="0" preCellId="../IT_L4/1/CELL_IT" postCellId="../PV_L5/0/CELL_PV" weight="0.00032325" delay="3.1345588296222973 ms"/>
            <connectionWD id="1" preCellId="../IT_L4/3/CELL_IT" postCellId="../PV_L5/0/CELL_PV" weight="0.00032325" delay="3.077484712346444 ms"/>
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        </projection>
        <projection id="NetConn_IT_L5A_PV_L5_AMPA" presynapticPopulation="IT_L5A" postsynapticPopulation="PV_L5" synapse="AMPA">
            <connectionWD id="0" preCellId="../IT_L5A/0/CELL_IT" postCellId="../PV_L5/0/CELL_PV" weight="0.00032325" delay="2.255732547103725 ms"/>
            <connectionWD id="1" preCellId="../IT_L5A/8/CELL_IT" postCellId="../PV_L5/0/CELL_PV" weight="0.00032325" delay="2.247273477280128 ms"/>
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        </projection>
        <projection id="NetConn_IT_L5B_PV_L5_AMPA" presynapticPopulation="IT_L5B" postsynapticPopulation="PV_L5" synapse="AMPA">
            <connectionWD id="0" preCellId="../IT_L5B/5/CELL_IT" postCellId="../PV_L5/0/CELL_PV" weight="0.00032325" delay="4.819150158841273 ms"/>
            <connectionWD id="1" preCellId="../IT_L5B/7/CELL_IT" postCellId="../PV_L5/0/CELL_PV" weight="0.00032325" delay="2.9982492675992294 ms"/>
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        </projection>
        <projection id="NetConn_SOM_L5_PV_L5_GABAB" presynapticPopulation="SOM_L5" postsynapticPopulation="PV_L5" synapse="GABAB">
            <connectionWD id="0" preCellId="../SOM_L5/0/CELL_SOM" postCellId="../PV_L5/0/CELL_PV" weight="0.00015" delay="2.8845322136442957 ms"/>
            <connectionWD id="1" preCellId="../SOM_L5/2/CELL_SOM" postCellId="../PV_L5/1/CELL_PV" weight="0.00015" delay="2.4625144219616812 ms"/>
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        </projection>
        <projection id="NetConn_PV_L5_PV_L5_GABAA" presynapticPopulation="PV_L5" postsynapticPopulation="PV_L5" synapse="GABAA">
            <connectionWD id="0" preCellId="../PV_L5/3/CELL_PV" postCellId="../PV_L5/0/CELL_PV" weight="0.00015" delay="2.212389925425047 ms"/>
            <connectionWD id="1" preCellId="../PV_L5/4/CELL_PV" postCellId="../PV_L5/1/CELL_PV" weight="0.00015" delay="2.4336154019955543 ms"/>
            <connectionWD id="2" preCellId="../PV_L5/0/CELL_PV" postCellId="../PV_L5/3/CELL_PV" weight="0.00015" delay="2.212389925425047 ms"/>
            <connectionWD id="3" preCellId="../PV_L5/1/CELL_PV" postCellId="../PV_L5/4/CELL_PV" weight="0.00015" delay="2.4336154019955543 ms"/>
        </projection>
        <projection id="NetConn_PT_L5B_PV_L5_AMPA" presynapticPopulation="PT_L5B" postsynapticPopulation="PV_L5" synapse="AMPA">
            <connectionWD id="0" preCellId="../PT_L5B/7/CELL_PT" postCellId="../PV_L5/1/CELL_PV" weight="0.00032325" delay="3.7662322411892344 ms"/>
            <connectionWD id="1" preCellId="../PT_L5B/3/CELL_PT" postCellId="../PV_L5/2/CELL_PV" weight="0.00032325" delay="6.663478454153083 ms"/>
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        </projection>
        <projection id="NetConn_IT_L6_PV_L5_AMPA" presynapticPopulation="IT_L6" postsynapticPopulation="PV_L5" synapse="AMPA">
            <connectionWD id="0" preCellId="../IT_L6/9/CELL_IT" postCellId="../PV_L5/2/CELL_PV" weight="0.000074358" delay="9.43432819423466 ms"/>
        </projection>
        <projection id="NetConn_CT_L6_PV_L5_AMPA" presynapticPopulation="CT_L6" postsynapticPopulation="PV_L5" synapse="AMPA">
            <connectionWD id="0" preCellId="../CT_L6/6/CELL_CT" postCellId="../PV_L5/4/CELL_PV" weight="0.000074358" delay="3.828360923601047 ms"/>
        </projection>
        <projection id="NetConn_IT_L23_SOM_L5_AMPA" presynapticPopulation="IT_L23" postsynapticPopulation="SOM_L5" synapse="AMPA">
            <connectionWD id="0" preCellId="../IT_L23/1/CELL_IT" postCellId="../SOM_L5/0/CELL_SOM" weight="0.000303" delay="6.182771623781864 ms"/>
            <connectionWD id="1" preCellId="../IT_L23/4/CELL_IT" postCellId="../SOM_L5/0/CELL_SOM" weight="0.000303" delay="5.9702675285787645 ms"/>
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        </projection>
        <projection id="NetConn_IT_L5A_SOM_L5_AMPA" presynapticPopulation="IT_L5A" postsynapticPopulation="SOM_L5" synapse="AMPA">
            <connectionWD id="0" preCellId="../IT_L5A/9/CELL_IT" postCellId="../SOM_L5/0/CELL_SOM" weight="0.00003675" delay="3.116170888742076 ms"/>
        </projection>
        <projection id="NetConn_CT_L6_SOM_L5_AMPA" presynapticPopulation="CT_L6" postsynapticPopulation="SOM_L5" synapse="AMPA">
            <connectionWD id="0" preCellId="../CT_L6/3/CELL_CT" postCellId="../SOM_L5/0/CELL_SOM" weight="0.000074358" delay="6.75156094552631 ms"/>
            <connectionWD id="1" preCellId="../CT_L6/10/CELL_CT" postCellId="../SOM_L5/3/CELL_SOM" weight="0.000074358" delay="4.336612262512033 ms"/>
        </projection>
        <projection id="NetConn_SOM_L5_SOM_L5_GABAB" presynapticPopulation="SOM_L5" postsynapticPopulation="SOM_L5" synapse="GABAB">
            <connectionWD id="0" preCellId="../SOM_L5/1/CELL_SOM" postCellId="../SOM_L5/0/CELL_SOM" weight="0.00015" delay="3.1848696521234823 ms"/>
            <connectionWD id="1" preCellId="../SOM_L5/3/CELL_SOM" postCellId="../SOM_L5/2/CELL_SOM" weight="0.00015" delay="2.4781677766764876 ms"/>
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        </projection>
        <projection id="NetConn_PV_L5_SOM_L5_GABAA" presynapticPopulation="PV_L5" postsynapticPopulation="SOM_L5" synapse="GABAA">
            <connectionWD id="0" preCellId="../PV_L5/3/CELL_PV" postCellId="../SOM_L5/0/CELL_SOM" weight="0.00015" delay="2.7308633597985614 ms"/>
            <connectionWD id="1" preCellId="../PV_L5/4/CELL_PV" postCellId="../SOM_L5/1/CELL_SOM" weight="0.00015" delay="3.319235686169982 ms"/>
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        </projection>
        <projection id="NetConn_IT_L5B_SOM_L5_AMPA" presynapticPopulation="IT_L5B" postsynapticPopulation="SOM_L5" synapse="AMPA">
            <connectionWD id="0" preCellId="../IT_L5B/3/CELL_IT" postCellId="../SOM_L5/1/CELL_SOM" weight="0.00003675" delay="2.5639932780012185 ms"/>
            <connectionWD id="1" preCellId="../IT_L5B/7/CELL_IT" postCellId="../SOM_L5/1/CELL_SOM" weight="0.00003675" delay="3.118293507235636 ms"/>
            <connectionWD id="2" preCellId="../IT_L5B/9/CELL_IT" postCellId="../SOM_L5/2/CELL_SOM" weight="0.00003675" delay="3.9726630683337962 ms"/>
        </projection>
        <projection id="NetConn_PT_L5B_SOM_L5_AMPA" presynapticPopulation="PT_L5B" postsynapticPopulation="SOM_L5" synapse="AMPA">
            <connectionWD id="0" preCellId="../PT_L5B/4/CELL_PT" postCellId="../SOM_L5/1/CELL_SOM" weight="0.00003675" delay="2.376741392671846 ms"/>
            <connectionWD id="1" preCellId="../PT_L5B/11/CELL_PT" postCellId="../SOM_L5/2/CELL_SOM" weight="0.00003675" delay="2.176870820911629 ms"/>
            <connectionWD id="2" preCellId="../PT_L5B/4/CELL_PT" postCellId="../SOM_L5/4/CELL_SOM" weight="0.00003675" delay="2.47061304895777 ms"/>
        </projection>
        <projection id="NetConn_IT_L6_SOM_L5_AMPA" presynapticPopulation="IT_L6" postsynapticPopulation="SOM_L5" synapse="AMPA">
            <connectionWD id="0" preCellId="../IT_L6/7/CELL_IT" postCellId="../SOM_L5/1/CELL_SOM" weight="0.000074358" delay="6.206608357662604 ms"/>
            <connectionWD id="1" preCellId="../IT_L6/3/CELL_IT" postCellId="../SOM_L5/2/CELL_SOM" weight="0.000074358" delay="3.9495182106072257 ms"/>
            <connectionWD id="2" preCellId="../IT_L6/5/CELL_IT" postCellId="../SOM_L5/4/CELL_SOM" weight="0.000074358" delay="5.716996967240202 ms"/>
        </projection>
        <projection id="NetConn_IT_L4_SOM_L5_AMPA" presynapticPopulation="IT_L4" postsynapticPopulation="SOM_L5" synapse="AMPA">
            <connectionWD id="0" preCellId="../IT_L4/7/CELL_IT" postCellId="../SOM_L5/3/CELL_SOM" weight="0.00003675" delay="6.172100659384416 ms"/>
        </projection>
        <projection id="NetConn_IT_L5A_PV_L6_AMPA" presynapticPopulation="IT_L5A" postsynapticPopulation="PV_L6" synapse="AMPA">
            <connectionWD id="0" preCellId="../IT_L5A/7/CELL_IT" postCellId="../PV_L6/0/CELL_PV" weight="0.00013125" delay="8.3715403859516 ms"/>
        </projection>
        <projection id="NetConn_IT_L5B_PV_L6_AMPA" presynapticPopulation="IT_L5B" postsynapticPopulation="PV_L6" synapse="AMPA">
            <connectionWD id="0" preCellId="../IT_L5B/3/CELL_IT" postCellId="../PV_L6/1/CELL_PV" weight="0.00013125" delay="5.170604835909336 ms"/>
        </projection>
        <projection id="NetConn_CT_L6_PV_L6_AMPA" presynapticPopulation="CT_L6" postsynapticPopulation="PV_L6" synapse="AMPA">
            <connectionWD id="0" preCellId="../CT_L6/1/CELL_CT" postCellId="../PV_L6/1/CELL_PV" weight="0.000159" delay="2.9357300464091884 ms"/>
        </projection>
        <projection id="NetConn_PV_L6_PV_L6_GABAA" presynapticPopulation="PV_L6" postsynapticPopulation="PV_L6" synapse="GABAA">
            <connectionWD id="0" preCellId="../PV_L6/0/CELL_PV" postCellId="../PV_L6/1/CELL_PV" weight="0.00015" delay="2.8984051082933604 ms"/>
        </projection>
        <projection id="NetConn_IT_L6_SOM_L6_AMPA" presynapticPopulation="IT_L6" postsynapticPopulation="SOM_L6" synapse="AMPA">
            <connectionWD id="0" preCellId="../IT_L6/4/CELL_IT" postCellId="../SOM_L6/0/CELL_SOM" weight="0.000159" delay="3.155431192275924 ms"/>
        </projection>
        <projection id="NetConn_CT_L6_SOM_L6_AMPA" presynapticPopulation="CT_L6" postsynapticPopulation="SOM_L6" synapse="AMPA">
            <connectionWD id="0" preCellId="../CT_L6/10/CELL_CT" postCellId="../SOM_L6/0/CELL_SOM" weight="0.000159" delay="3.602479210017111 ms"/>
        </projection>
        <projection id="NetConn_PV_L6_SOM_L6_GABAA" presynapticPopulation="PV_L6" postsynapticPopulation="SOM_L6" synapse="GABAA">
            <connectionWD id="0" preCellId="../PV_L6/0/CELL_PV" postCellId="../SOM_L6/0/CELL_SOM" weight="0.00015" delay="2.4168932946790984 ms"/>
            <connectionWD id="1" preCellId="../PV_L6/1/CELL_PV" postCellId="../SOM_L6/1/CELL_SOM" weight="0.00015" delay="2.7883067667747805 ms"/>
        </projection>
        <projection id="NetConn_PT_L5B_SOM_L6_AMPA" presynapticPopulation="PT_L5B" postsynapticPopulation="SOM_L6" synapse="AMPA">
            <connectionWD id="0" preCellId="../PT_L5B/1/CELL_PT" postCellId="../SOM_L6/1/CELL_SOM" weight="0.00013125" delay="4.462396160345681 ms"/>
            <connectionWD id="1" preCellId="../PT_L5B/3/CELL_PT" postCellId="../SOM_L6/1/CELL_SOM" weight="0.00013125" delay="4.0835441417330856 ms"/>
        </projection>
        <projection id="NetConn_SOM_L6_SOM_L6_GABAB" presynapticPopulation="SOM_L6" postsynapticPopulation="SOM_L6" synapse="GABAB">
            <connectionWD id="0" preCellId="../SOM_L6/0/CELL_SOM" postCellId="../SOM_L6/1/CELL_SOM" weight="0.00015" delay="4.032663667837902 ms"/>
        </projection>
        <projection id="NetConn_NetStim_background_E_IT_L23_10_1_AMPA__IT_L23" presynapticPopulation="Pop_NetStim_background_E_IT_L23_10_1_AMPA" postsynapticPopulation="IT_L23" synapse="AMPA">
            <connectionWD id="0" preCellId="../Pop_NetStim_background_E_IT_L23_10_1_AMPA[0]" postCellId="../IT_L23/0/CELL_IT" weight="0.025" delay="7.562338046009272 ms"/>
            <connectionWD id="1" preCellId="../Pop_NetStim_background_E_IT_L23_10_1_AMPA[1]" postCellId="../IT_L23/1/CELL_IT" weight="0.025" delay="8.734109451855797 ms"/>
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        </projection>
        <projection id="NetConn_NetStim_background_E_IT_L4_10_1_AMPA__IT_L4" presynapticPopulation="Pop_NetStim_background_E_IT_L4_10_1_AMPA" postsynapticPopulation="IT_L4" synapse="AMPA">
            <connectionWD id="0" preCellId="../Pop_NetStim_background_E_IT_L4_10_1_AMPA[0]" postCellId="../IT_L4/0/CELL_IT" weight="0.025" delay="6.319171651181868 ms"/>
            <connectionWD id="1" preCellId="../Pop_NetStim_background_E_IT_L4_10_1_AMPA[1]" postCellId="../IT_L4/1/CELL_IT" weight="0.025" delay="6.740778003636151 ms"/>
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        </projection>
        <projection id="NetConn_NetStim_background_E_IT_L5A_10_1_AMPA__IT_L5A" presynapticPopulation="Pop_NetStim_background_E_IT_L5A_10_1_AMPA" postsynapticPopulation="IT_L5A" synapse="AMPA">
            <connectionWD id="0" preCellId="../Pop_NetStim_background_E_IT_L5A_10_1_AMPA[0]" postCellId="../IT_L5A/0/CELL_IT" weight="0.025" delay="7.610790348583449 ms"/>
            <connectionWD id="1" preCellId="../Pop_NetStim_background_E_IT_L5A_10_1_AMPA[1]" postCellId="../IT_L5A/1/CELL_IT" weight="0.025" delay="4.830339007622413 ms"/>
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        </projection>
        <projection id="NetConn_NetStim_background_E_IT_L5B_10_1_AMPA__IT_L5B" presynapticPopulation="Pop_NetStim_background_E_IT_L5B_10_1_AMPA" postsynapticPopulation="IT_L5B" synapse="AMPA">
            <connectionWD id="0" preCellId="../Pop_NetStim_background_E_IT_L5B_10_1_AMPA[0]" postCellId="../IT_L5B/0/CELL_IT" weight="0.025" delay="6.416110468469217 ms"/>
            <connectionWD id="1" preCellId="../Pop_NetStim_background_E_IT_L5B_10_1_AMPA[1]" postCellId="../IT_L5B/1/CELL_IT" weight="0.025" delay="6.255903034283907 ms"/>
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        </projection>
        <projection id="NetConn_NetStim_background_E_PT_L5B_10_1_AMPA__PT_L5B" presynapticPopulation="Pop_NetStim_background_E_PT_L5B_10_1_AMPA" postsynapticPopulation="PT_L5B" synapse="AMPA">
            <connectionWD id="0" preCellId="../Pop_NetStim_background_E_PT_L5B_10_1_AMPA[0]" postCellId="../PT_L5B/0/CELL_PT" weight="0.0375" delay="10.999201315406108 ms"/>
            <connectionWD id="1" preCellId="../Pop_NetStim_background_E_PT_L5B_10_1_AMPA[1]" postCellId="../PT_L5B/1/CELL_PT" weight="0.0375" delay="8.561198711298593 ms"/>
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        </projection>
        <projection id="NetConn_NetStim_background_E_IT_L6_10_1_AMPA__IT_L6" presynapticPopulation="Pop_NetStim_background_E_IT_L6_10_1_AMPA" postsynapticPopulation="IT_L6" synapse="AMPA">
            <connectionWD id="0" preCellId="../Pop_NetStim_background_E_IT_L6_10_1_AMPA[0]" postCellId="../IT_L6/0/CELL_IT" weight="0.025" delay="8.619911998625394 ms"/>
            <connectionWD id="1" preCellId="../Pop_NetStim_background_E_IT_L6_10_1_AMPA[1]" postCellId="../IT_L6/1/CELL_IT" weight="0.025" delay="8.42029400465458 ms"/>
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        </projection>
        <projection id="NetConn_NetStim_background_E_CT_L6_10_1_AMPA__CT_L6" presynapticPopulation="Pop_NetStim_background_E_CT_L6_10_1_AMPA" postsynapticPopulation="CT_L6" synapse="AMPA">
            <connectionWD id="0" preCellId="../Pop_NetStim_background_E_CT_L6_10_1_AMPA[0]" postCellId="../CT_L6/0/CELL_CT" weight="0.025" delay="8.509519264729857 ms"/>
            <connectionWD id="1" preCellId="../Pop_NetStim_background_E_CT_L6_10_1_AMPA[1]" postCellId="../CT_L6/1/CELL_CT" weight="0.025" delay="5.18590456052891 ms"/>
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        </projection>
        <projection id="NetConn_NetStim_background_E_PV_L23_10_1_AMPA__PV_L23" presynapticPopulation="Pop_NetStim_background_E_PV_L23_10_1_AMPA" postsynapticPopulation="PV_L23" synapse="AMPA">
            <connectionWD id="0" preCellId="../Pop_NetStim_background_E_PV_L23_10_1_AMPA[0]" postCellId="../PV_L23/0/CELL_PV" weight="0.0125" delay="4.62801415786144 ms"/>
            <connectionWD id="1" preCellId="../Pop_NetStim_background_E_PV_L23_10_1_AMPA[1]" postCellId="../PV_L23/1/CELL_PV" weight="0.0125" delay="6.3933771366807095 ms"/>
        </projection>
        <projection id="NetConn_NetStim_background_E_SOM_L23_10_1_AMPA__SOM_L23" presynapticPopulation="Pop_NetStim_background_E_SOM_L23_10_1_AMPA" postsynapticPopulation="SOM_L23" synapse="AMPA">
            <connectionWD id="0" preCellId="../Pop_NetStim_background_E_SOM_L23_10_1_AMPA[0]" postCellId="../SOM_L23/0/CELL_SOM" weight="0.0075" delay="4.437277598652584 ms"/>
            <connectionWD id="1" preCellId="../Pop_NetStim_background_E_SOM_L23_10_1_AMPA[1]" postCellId="../SOM_L23/1/CELL_SOM" weight="0.0075" delay="6.1531357901947485 ms"/>
        </projection>
        <projection id="NetConn_NetStim_background_E_PV_L5_10_1_AMPA__PV_L5" presynapticPopulation="Pop_NetStim_background_E_PV_L5_10_1_AMPA" postsynapticPopulation="PV_L5" synapse="AMPA">
            <connectionWD id="0" preCellId="../Pop_NetStim_background_E_PV_L5_10_1_AMPA[0]" postCellId="../PV_L5/0/CELL_PV" weight="0.0125" delay="9.438005410093881 ms"/>
            <connectionWD id="1" preCellId="../Pop_NetStim_background_E_PV_L5_10_1_AMPA[1]" postCellId="../PV_L5/1/CELL_PV" weight="0.0125" delay="7.549640173741559 ms"/>
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        </projection>
        <projection id="NetConn_NetStim_background_E_SOM_L5_10_1_AMPA__SOM_L5" presynapticPopulation="Pop_NetStim_background_E_SOM_L5_10_1_AMPA" postsynapticPopulation="SOM_L5" synapse="AMPA">
            <connectionWD id="0" preCellId="../Pop_NetStim_background_E_SOM_L5_10_1_AMPA[0]" postCellId="../SOM_L5/0/CELL_SOM" weight="0.0075" delay="6.111839107631226 ms"/>
            <connectionWD id="1" preCellId="../Pop_NetStim_background_E_SOM_L5_10_1_AMPA[1]" postCellId="../SOM_L5/1/CELL_SOM" weight="0.0075" delay="7.060484073900859 ms"/>
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        </projection>
        <projection id="NetConn_NetStim_background_E_PV_L6_10_1_AMPA__PV_L6" presynapticPopulation="Pop_NetStim_background_E_PV_L6_10_1_AMPA" postsynapticPopulation="PV_L6" synapse="AMPA">
            <connectionWD id="0" preCellId="../Pop_NetStim_background_E_PV_L6_10_1_AMPA[0]" postCellId="../PV_L6/0/CELL_PV" weight="0.0125" delay="7.935360462418177 ms"/>
            <connectionWD id="1" preCellId="../Pop_NetStim_background_E_PV_L6_10_1_AMPA[1]" postCellId="../PV_L6/1/CELL_PV" weight="0.0125" delay="8.75331781107727 ms"/>
        </projection>
        <projection id="NetConn_NetStim_background_E_SOM_L6_10_1_AMPA__SOM_L6" presynapticPopulation="Pop_NetStim_background_E_SOM_L6_10_1_AMPA" postsynapticPopulation="SOM_L6" synapse="AMPA">
            <connectionWD id="0" preCellId="../Pop_NetStim_background_E_SOM_L6_10_1_AMPA[0]" postCellId="../SOM_L6/0/CELL_SOM" weight="0.0075" delay="8.047064471843406 ms"/>
            <connectionWD id="1" preCellId="../Pop_NetStim_background_E_SOM_L6_10_1_AMPA[1]" postCellId="../SOM_L6/1/CELL_SOM" weight="0.0075" delay="6.535607703595039 ms"/>
        </projection>
    </network>
</neuroml>
