<?xml version="1.0" encoding="UTF-8"?>
<neuroml xmlns="http://www.neuroml.org/schema/neuroml2" xmlns:xsi="http://www.w3.org/2001/XMLSchema-instance" xsi:schemaLocation="http://www.neuroml.org/schema/neuroml2  https://raw.githubusercontent.com/NeuroML/NeuroML2/development/Schemas/NeuroML2/NeuroML_v2beta5.xsd" id="Golgi_NeuroML_">

    <!-- <include href="CaHVA.channel.nml"/>
    <include href="CaLVA.channel.nml"/>
    <include href="Golgi_CALC_ca2.nml"/>
    <include href="Golgi_CALC.nml"/>
    <include href="hcn1f.channel.nml"/>
    <include href="hcn1s.channel.nml"/>
    <include href="hcn2f.channel.nml"/>
    <include href="hcn2s.channel.nml"/>
    <include href="KA.channel.nml"/>
    <include href="KAHP.channel.nml"/>
    <include href="KC.channel.nml"/>
    <include href="Kslow.channel.nml"/>
    <include href="KV.channel.nml"/>
    <include href="LeakConductance.channel.nml"/>
    <include href="NaP.channel.nml"/>
    <include href="NaR.channel.nml"/>

    <include href="NaT.channel.nml"/> -->

    <include href="Golgi_Ca_HVA.channel.nml"/>

    <include href="Golgi_Ca_LVA.channel.nml"/>

    <include href="Golgi_CALC.nml"/>

    <include href="Golgi_CALC_ca2.nml"/>

    <include href="Golgi_hcn1f.channel.nml"/>
    <include href="Golgi_hcn1s.channel.nml"/>
    <include href="Golgi_hcn2f.channel.nml"/>
    <include href="Golgi_hcn2s.channel.nml"/>

    <include href="Golgi_KA.channel.nml"/>

    <include href="Golgi_KC.channel.nml"/>

    <include href="Golgi_Kslow.channel.nml"/>

    <include href="Golgi_KAHP.channel.nml"/>

    <include href="Golgi_KV.channel.nml"/>

    <include href="LeakCond.channel.nml"/>

    <include href="Golgi_NaP.channel.nml"/>

    <include href="Golgi_NaR.channel.nml"/>

    <include href="Golgi_NaT.channel.nml"/>

    <cell2CaPools id="Golgi_NeuroML_">

        <notes>A conversion to NeuroML (with channels specified in ChannelML) of the Golgi_040408_C1_v2 cell model in this project.
See the main project description for more details on the cells included with this project.</notes>

        <morphology id="morphology_Golgi_NeuroML_">

            <segment id="0" name="RootSegment">
                <proximal x="0.0" y="0.0" z="0.0" diameter="27.0"/>
                <distal x="0.0" y="0.0" z="0.0" diameter="27.0"/>
            </segment>

            <segment id="107806" name="AxonBlue_1_R">
                <parent segment="0"/>
                <proximal x="0.03" y="-10.04" z="1.1" diameter="1.1294255"/>
                <distal x="-9.387539" y="-47.225243" z="0.4109118" diameter="1.1294255"/>
            </segment>

            <segment id="107807" name="AxonBlue_10000">
                <parent segment="107806"/>
                <proximal x="-9.387539" y="-47.225243" z="0.4109118" diameter="0.57672644"/>
                <distal x="-18.805077" y="-84.410484" z="-0.27817643" diameter="0.57672644"/>
            </segment>

            <segment id="107808" name="AxonBlue_1_R_1">
                <parent segment="107807"/>
                <proximal x="-18.42" y="-82.89" z="-0.25" diameter="0.5444064"/>
                <distal x="-25.8098" y="-86.04941" z="-0.13100164" diameter="0.5444064"/>
            </segment>

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
            <segmentGroup id="Soma" neuroLexId="sao864921383">    <!--
                This group contains an unbranched set of segments, and all of the segmentGroups marked with
                neuroLexId = sao864921383 form a non-overlapping set of all of the segments.
                These segmentGroups correspond to the 'cables' of NeuroML v1.8.1. -->

                <member segment="0"/>
            </segmentGroup>

            <segmentGroup id="SecAxonBlue_1_R" neuroLexId="sao864921383">    <!--
                This group contains an unbranched set of segments, and all of the segmentGroups marked with
                neuroLexId = sao864921383 form a non-overlapping set of all of the segments.
                These segmentGroups correspond to the 'cables' of NeuroML v1.8.1. -->

                <member segment="107806"/>
            </segmentGroup>

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
            <segmentGroup id="soma_group" neuroLexId="GO:0043025">    <!--Soma group-->

                <include segmentGroup="Soma"/>
            </segmentGroup>

            <segmentGroup id="colour_Blue">
                <include segmentGroup="SecAxonBlue_1_R"/>
                <include segmentGroup="SecAxonBlue_1_R_Gen2ndComp"/>
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            </segmentGroup>

            <segmentGroup id="axon_group" neuroLexId="GO:0030424">    <!--Axon group-->

                <include segmentGroup="SecAxonBlue_1_R"/>
                <include segmentGroup="SecAxonBlue_1_R_Gen2ndComp"/>
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            </segmentGroup>

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
        </morphology>

            <!--Adding the biophysical parameters-->

        <biophysicalProperties2CaPools id="biophys">

            <membraneProperties2CaPools>

                <channelDensity condDensity="0.25 mS_per_cm2" id="CaLVA_soma_group" ionChannel="Golgi_Ca_LVA" segmentGroup="soma_group" ion="ca2" erev="132.458 mV"/>

                <channelDensity condDensity="0.05 mS_per_cm2" id="hcn1f_soma_group" ionChannel="Golgi_hcn1f" segmentGroup="soma_group" ion="h" erev="-20.0 mV"/>

                <channelDensity condDensity="0.05 mS_per_cm2" id="hcn1s_soma_group" ionChannel="Golgi_hcn1s" segmentGroup="soma_group" ion="h" erev="-20.0 mV"/>

                <channelDensity condDensity="0.08 mS_per_cm2" id="hcn2f_soma_group" ionChannel="Golgi_hcn2f" segmentGroup="soma_group" ion="h" erev="-20.0 mV"/>

                <channelDensity condDensity="0.08 mS_per_cm2" id="hcn2s_soma_group" ionChannel="Golgi_hcn2s" segmentGroup="soma_group" ion="h" erev="-20.0 mV"/>

                <channelDensity condDensity="8.0 mS_per_cm2" id="KA_soma_group" ionChannel="Golgi_KA" segmentGroup="soma_group" ion="k" erev="-84.69 mV"/>

                <channelDensity condDensity="38.0 mS_per_cm2" id="KAHP_soma_group" ionChannel="Golgi_KAHP" segmentGroup="soma_group" ion="k" erev="-84.69 mV"/>

                <channelDensity condDensity="3.0 mS_per_cm2" id="KC_soma_group" ionChannel="Golgi_KC" segmentGroup="soma_group" ion="k" erev="-84.69 mV"/>

                <channelDensity condDensity="1.0 mS_per_cm2" id="Kslow_soma_group" ionChannel="Golgi_Kslow" segmentGroup="soma_group" ion="k" erev="-84.69 mV"/>

                <channelDensity condDensity="32.0 mS_per_cm2" id="KV_soma_group" ionChannel="Golgi_KV" segmentGroup="soma_group" ion="k" erev="-84.69 mV"/>

                <channelDensity condDensity="0.021 mS_per_cm2" id="LeakConductance_all" ionChannel="LeakCond" ion="non_specific" erev="-55.0 mV"/>

                <channelDensity condDensity="0.19 mS_per_cm2" id="NaP_soma_group" ionChannel="Golgi_NaP" segmentGroup="soma_group" ion="na" erev="87.39 mV"/>

                <channelDensity condDensity="1.7 mS_per_cm2" id="NaR_soma_group" ionChannel="Golgi_NaR" segmentGroup="soma_group" ion="na" erev="87.39 mV"/>

                <channelDensity condDensity="48.0 mS_per_cm2" id="NaT_soma_group" ionChannel="Golgi_NaT" segmentGroup="soma_group" ion="na" erev="87.39 mV"/>

                <channelDensityNernst condDensity="0.46 mS_per_cm2" id="CaHVA_soma_group" ionChannel="Golgi_Ca_HVA" segmentGroup="soma_group" ion="ca"/>

                <channelDensityNernstCa2 condDensity="0.25 mS_per_cm2" id="Ca_LVA_soma_group" ionChannel="Golgi_Ca_LVA" segmentGroup="soma_group" ion="ca"/>

                <spikeThresh value="-20.0 mV"/>

                <specificCapacitance value="1.0 uF_per_cm2"/>

                <initMembPotential value="-60.0 mV"/>

            </membraneProperties2CaPools>

            <intracellularProperties2CaPools>

                <species id="ca" ion="ca"  segmentGroup="soma_group" concentrationModel="Golgi_CALC" initialConcentration="5e-11mol_per_cm3" initialExtConcentration="2.0E-6 mol_per_cm3"/>

                <species id="ca2"  ion="ca2"  segmentGroup="soma_group" concentrationModel="Golgi_CALC_ca2" initialConcentration="5e-11mol_per_cm3" initialExtConcentration="2.0E-6 mol_per_cm3"/>

                <resistivity value="0.1 kohm_cm"/>

            </intracellularProperties2CaPools>

        </biophysicalProperties2CaPools>

    </cell2CaPools>

</neuroml>
