<?xml version="1.0" encoding="UTF-8"?>
<neuroml xmlns="http://www.neuroml.org/schema/neuroml2" xmlns:xsi="http://www.w3.org/2001/XMLSchema-instance" xsi:schemaLocation="http://www.neuroml.org/schema/neuroml2  https://raw.githubusercontent.com/NeuroML/NeuroML2/development/Schemas/NeuroML2/NeuroML_v2beta5.xsd" id="network_VervaekeEtAl_GolgiCellNetwork">

    <notes>

Network structure (NeuroML 2beta5) for project: VervaekeEtAl-GolgiCellNetwork saved with neuroConstruct v1.7.1 on: 19:01:13, 27-Sep-17

Cell Group: CellGroup_1 contains 45 cells

Network connection: NetConn_CellGroup_1_CellGroup_1 contains 352 individual synaptic connections

    </notes>

    <include href="ApicalSyn.synapse.nml"/>
    <!-- <include href="MultiDecaySyn.synapse.nml"/> -->

    <include href="GapJuncCML.nml"/>
    <include href="Golgi_NeuroML_.cell.nml"/>

    <poissonFiringSynapse id="Input_20" averageRate="0.5 per_s" synapse="ApicalSyn" spikeTarget="./ApicalSyn"/>
    <!-- <poissonFiringSynapse id="Input_21" averageRate="0.002 per_ms" synapse="MultiDecaySyn" spikeTarget="./MultiDecaySyn"/> -->

    <network id="network_VervaekeEtAl_GolgiCellNetwork" type="networkWithTemperature" temperature="23.0 degC">

        <population id="CellGroup_1" component="Golgi_NeuroML_" type="populationList">
            <instance id="0" node_id="0">
                <location x="81.49986" y="74.79648" z="196.2143"/>
            </instance>
            <instance id="1" node_id="1">
                <location x="94.35665" y="60.1854" z="43.999775"/>
            </instance>
            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 <!-- -->
        </population>

        <electricalProjection id="NetConn_CellGroup_1_CellGroup_1" presynapticPopulation="CellGroup_1" postsynapticPopulation="CellGroup_1">
            <electricalConnection id="0" preCell="0" postCell="38" preSegment="108379" preFractionAlong="0.30940425" postSegment="108309" postFractionAlong="0.37337354" synapse="GapJuncCML"/>
            <electricalConnection id="1" preCell="0" postCell="42" preSegment="108373" preFractionAlong="0.19398496" postSegment="108406" postFractionAlong="0.48614755" synapse="GapJuncCML"/>
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        </electricalProjection>
        <!--
        <inputList id="Input_21" component="Input_21" population="CellGroup_1">
            <input id="0" target="../CellGroup_1/0/Golgi_NeuroML_" destination="synapses" segmentId="108388" fractionAlong="0.90584886"/>
            <input id="1" target="../CellGroup_1/0/Golgi_NeuroML_" destination="synapses" segmentId="108406" fractionAlong="0.9549891"/>
            <input id="2" target="../CellGroup_1/0/Golgi_NeuroML_" destination="synapses" segmentId="108401" fractionAlong="0.31078875"/>
            <input id="3" target="../CellGroup_1/0/Golgi_NeuroML_" destination="synapses" segmentId="108400" fractionAlong="0.45682845"/>
            <input id="4" target="../CellGroup_1/0/Golgi_NeuroML_" destination="synapses" segmentId="108384" fractionAlong="0.743294"/>
            <input id="5" target="../CellGroup_1/0/Golgi_NeuroML_" destination="synapses" segmentId="108376" fractionAlong="0.68995756"/>
            <input id="6" target="../CellGroup_1/0/Golgi_NeuroML_" destination="synapses" segmentId="108402" fractionAlong="0.79128116"/>
            <input id="7" target="../CellGroup_1/0/Golgi_NeuroML_" destination="synapses" segmentId="108402" fractionAlong="0.45440748"/>
            <input id="8" target="../CellGroup_1/0/Golgi_NeuroML_" destination="synapses" segmentId="108366" fractionAlong="0.6264269"/>
            <input id="9" target="../CellGroup_1/0/Golgi_NeuroML_" destination="synapses" segmentId="108402" fractionAlong="0.983223"/>
            <input id="10" target="../CellGroup_1/0/Golgi_NeuroML_" destination="synapses" segmentId="108400" fractionAlong="0.29644215"/>
            <input id="11" target="../CellGroup_1/0/Golgi_NeuroML_" destination="synapses" segmentId="108381" fractionAlong="0.67241687"/>
            <input id="12" target="../CellGroup_1/0/Golgi_NeuroML_" destination="synapses" segmentId="108400" fractionAlong="0.5338843"/>
            <input id="13" target="../CellGroup_1/0/Golgi_NeuroML_" destination="synapses" segmentId="108393" fractionAlong="0.44822758"/>
            <input id="14" target="../CellGroup_1/0/Golgi_NeuroML_" destination="synapses" segmentId="108376" fractionAlong="0.67610615"/>
            <input id="15" target="../CellGroup_1/0/Golgi_NeuroML_" destination="synapses" segmentId="108403" fractionAlong="0.91623497"/>
            <input id="16" target="../CellGroup_1/0/Golgi_NeuroML_" destination="synapses" segmentId="108366" fractionAlong="0.5754009"/>
            <input id="17" target="../CellGroup_1/0/Golgi_NeuroML_" destination="synapses" segmentId="108401" fractionAlong="0.6435186"/>
            <input id="18" target="../CellGroup_1/0/Golgi_NeuroML_" destination="synapses" segmentId="108365" fractionAlong="0.5786083"/>
            <input id="19" target="../CellGroup_1/0/Golgi_NeuroML_" destination="synapses" segmentId="108412" fractionAlong="0.15196162"/>
            <input id="20" target="../CellGroup_1/1/Golgi_NeuroML_" destination="synapses" segmentId="108380" fractionAlong="0.22964273"/>
            <input id="21" target="../CellGroup_1/1/Golgi_NeuroML_" destination="synapses" segmentId="108406" fractionAlong="0.44249094"/>
            <input id="22" target="../CellGroup_1/1/Golgi_NeuroML_" destination="synapses" segmentId="108368" fractionAlong="0.444531"/>
            <input id="23" target="../CellGroup_1/1/Golgi_NeuroML_" destination="synapses" segmentId="108370" fractionAlong="0.06270748"/>
            <input id="24" target="../CellGroup_1/1/Golgi_NeuroML_" destination="synapses" segmentId="108394" fractionAlong="0.5247803"/>
            <input id="25" target="../CellGroup_1/1/Golgi_NeuroML_" destination="synapses" segmentId="108393" fractionAlong="0.48267606"/>
            <input id="26" target="../CellGroup_1/1/Golgi_NeuroML_" destination="synapses" segmentId="108368" fractionAlong="0.5230543"/>
            <input id="27" target="../CellGroup_1/1/Golgi_NeuroML_" destination="synapses" segmentId="108407" fractionAlong="0.6937306"/>
            <input id="28" target="../CellGroup_1/1/Golgi_NeuroML_" destination="synapses" segmentId="108379" fractionAlong="0.790811"/>
            <input id="29" target="../CellGroup_1/1/Golgi_NeuroML_" destination="synapses" segmentId="108367" fractionAlong="0.28440097"/>
            <input id="30" target="../CellGroup_1/1/Golgi_NeuroML_" destination="synapses" segmentId="108372" fractionAlong="0.12044593"/>
            <input id="31" target="../CellGroup_1/1/Golgi_NeuroML_" destination="synapses" segmentId="108380" fractionAlong="0.5144155"/>
            <input id="32" target="../CellGroup_1/1/Golgi_NeuroML_" destination="synapses" segmentId="108402" fractionAlong="0.104173526"/>
            <input id="33" target="../CellGroup_1/1/Golgi_NeuroML_" destination="synapses" segmentId="108407" fractionAlong="0.06823256"/>
            <input id="34" target="../CellGroup_1/1/Golgi_NeuroML_" destination="synapses" segmentId="108392" fractionAlong="0.9844144"/>
            <input id="35" target="../CellGroup_1/1/Golgi_NeuroML_" destination="synapses" segmentId="108403" fractionAlong="0.4426414"/>
            <input id="36" target="../CellGroup_1/1/Golgi_NeuroML_" destination="synapses" segmentId="108399" fractionAlong="0.23012723"/>
            <input id="37" target="../CellGroup_1/1/Golgi_NeuroML_" destination="synapses" segmentId="108406" fractionAlong="0.78625065"/>
            <input id="38" target="../CellGroup_1/1/Golgi_NeuroML_" destination="synapses" segmentId="108395" fractionAlong="0.18167639"/>
            <input id="39" target="../CellGroup_1/1/Golgi_NeuroML_" destination="synapses" segmentId="108400" fractionAlong="0.7970342"/>
            <input id="40" target="../CellGroup_1/2/Golgi_NeuroML_" destination="synapses" segmentId="108415" fractionAlong="0.2836133"/>
            <input id="41" target="../CellGroup_1/2/Golgi_NeuroML_" destination="synapses" segmentId="108401" fractionAlong="0.8033275"/>
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        -->

        <inputList id="Input_20" component="Input_20" population="CellGroup_1">
            <input id="0" target="../CellGroup_1/0/Golgi_NeuroML_" destination="synapses" segmentId="108371" fractionAlong="0.0034650879"/>
            <input id="1" target="../CellGroup_1/0/Golgi_NeuroML_" destination="synapses" segmentId="108370" fractionAlong="0.56817335"/>
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        </inputList>

        <!--  -->
    </network>
</neuroml>
